02/07/2012
13:23
;Model Desc: Two compartment Model, Using ADVAN3, TRANS4
;Project Name: nm7examples
;Project ID: NO PROJECT DESCRIPTION

$PROB RUN# Example 1 (from samp5l)
$INPUT C SET ID JID TIME  DV=CONC AMT=DOSE RATE EVID MDV CMT CLX V1X QX V2X SDIX SDSX
$DATA example1.csv IGNORE=C

$SUBROUTINES ADVAN3 TRANS4

;NTHETA=number of Thetas to be estimated
;NETA=number of Etas to be estimated (and to be described by NETAxBETA OMEGA matrix)
;NTHP=number of thetas which have a prior
;NETP=number of Omegas with prior
;Prior information is important for MCMC Bayesian analysis, not necessary for maximization
; methods
;$PRIOR NWPRI NTHETA=4, NETA=4, NTHP=4, NETP=4

$PK
; The thetas are MU modeled.  Best that there is a linear relationship between THETAs and Mus
;  The linear MU modeling of THETAS allows them to be efficiently Gibbs sampled.
MU_1=THETA(1)
MU_2=THETA(2)
MU_3=THETA(3)
MU_4=THETA(4)
CL=DEXP(MU_1+ETA(1))
V1=DEXP(MU_2+ETA(2))
Q=DEXP(MU_3+ETA(3))
V2=DEXP(MU_4+ETA(4))
S1=V1

$ERROR
Y = F + F*EPS(1)

; Initial values of THETA
$THETA
(0.001, 2.0) ;[LN(CL)]
(0.001, 2.0) ;[LN(V1)]
(0.001, 2.0) ;[LN(Q)]
(0.001, 2.0) ;[LN(V2)]
;INITIAL values of OMEGA
$OMEGA BLOCK(4)
0.15   ;[P]
0.01  ;[F]
0.15   ;[P]
0.01  ;[F]
0.01  ;[F]
0.15   ;[P]
0.01  ;[F]
0.01  ;[F]
0.01  ;[F]
0.15   ;[P]
;Initial value of SIGMA
$SIGMA
(0.6 )   ;[P]

; Prior information of THETAS
;$THETA (2.0 FIX) (2.0 FIX) (2.0 FIX) (2.0 FIX)

; Variance to prior information of THETAS.  Because variances are very large, this
; means that the prior information to the THETAS is highly uninformative.
;$OMEGA BLOCK(4)
;10000 FIX
;0.00 10000
;0.00  0.00 10000
;0.00  0.00 0.0 10000

; Prior information to the OMEGAS.
;$OMEGA BLOCK(4)
;0.2 FIX
;0.0  0.2
;0.0  0.0 0.2
;0.0  0.0 0.0 0.2
;Degrees of freedom to prior OMEGA matrix.  Because degrees of freedom is very low, equal to the
; the dimension of the prior OMEGA, this means that the prior information to the OMEGAS is
; highly uninformative
;$THETA (4 FIX)

; The first analysis is iterative two-stage, maximum of 500 iterations (NITER), iteration results
; are printed every 5 iterations, gradient precision (SIGL) is 4. Termination is tested on all of
; the population parameters (CTYPE=3), and for less then 2 significant digits change (NSIG).
; Prior information is not necessary for ITS, so NOPRIOR=1.  The intermediate and final results
; of the ITS method will be recoded in row/column format in example1.ext
$EST METHOD=ITS INTERACTION NITER=500 PRINT=5 NOABORT SIGL=4 CTYPE=3 CITER=10
     CALPHA=0.05 NOPRIOR=1 NSIG=2
; The results of ITS are used as the initial values for the SAEM method.  A maximum of 3000
; stochastic iterations (NBURN) is requested, but may end early if statistical test determines
; that variations in all parameters is stationary (note that any settings from the previous $EST
; carries over to the next $EST statement, within a $PROB).  The SAEM is a Monte Carlo process,
; so setting the SEED assures repeatability of results.  Each iteration obtains only 2 Monte
; Carlo samples ISAMPLE), so they are very fast.  But many iterations are needed, so PRINT only
; every 100th iteration.  After the stochastic phase, 500 accumulation iterations will be
; Performed (NITER), to obtain good parameters estimates with little stochastic noise.
; As a new FILE has not been given, the SAEM results will append to example1.ext.
$EST METHOD=SAEM INTERACTION NBURN=3000 NITER=500 PRINT=100 SEED=1556678 ISAMPLE=2
; After the SAEM method, obtain good estimates of the marginal density (objective function),
; along with good estimates of the standard errors.  This is best done with importance sampling
; (IMP), performing the expectation step only (EONLY=1), so that final population parameters
; remain at the final SAEM result.  Five iterations (NITER) should allow the importance sampling
; proposal density to become stationary.  This is observed by the objective function settling
; to a particular value (with some stochastic noise).  By using 3000 Monte Carlo samples
; (ISAMPLE), this assures a precise assessment of standard errors.
$EST METHOD=IMP  INTERACTION EONLY=1 NITER=5 ISAMPLE=3000 PRINT=1 SIGL=8 NOPRIOR=1
; The Bayesian analysis is performed.  While 10000 burn-in
; iterations are requested as a maximum, because the termination test is on (CTYPE<>0, set at the
; first $EST statement), and because the initial parameters are at the SAEM result, which is the
; maximum likelihood position, the analysis should settle down to a stationary distribution in
; several hundred iterations.  Prior information is also used to facilitate Bayesian analysis.
; The individual Bayesian iteration results are important, and may be need for post-processing
; analysis. So specify a separate FILE for the Bayesian analysis.
$EST METHOD=BAYES INTERACTION FILE=example1.txt NBURN=10000 NITER=10000 PRINT=100 NOPRIOR=1
; Just for old-times sake, let?s see what the traditional FOCE method will give us.
; And, remember to introduce a new FILE, so its results won?t append to our Bayesian FILE.
; Appending to example1.ext with the EM methods is fine.
$EST METHOD=COND INTERACTION MAXEVAL=9999 NSIG=3 SIGL=10 PRINT=5 NOABORT NOPRIOR=1
     FILE=example1.ext
; Time for the standard error results.  You may request a more precise gradient precision (SIGL)
; that differed from that used during estimation.
$COV MATRIX=R PRINT=E UNCONDITIONAL SIGL=12
; Print out results in tables. Include some of the new weighted residual types
$TABLE ID TIME PRED RES WRES CPRED CWRES EPRED ERES EWRES NOAPPEND ONEHEADER
 FILE=example1.TAB NOPRINT
$TABLE ID CL V1 Q V2 FIRSTONLY NOAPPEND NOPRINT FILE=example1.PAR
$TABLE ID ETA1 ETA2 ETA3 ETA4 FIRSTONLY NOAPPEND NOPRINT FILE=example1.ETA

NM-TRAN MESSAGES
 WARNINGS AND ERRORS (IF ANY) FOR PROBLEM    1
 (WARNING  2) NM-TRAN INFERS THAT THE DATA ARE POPULATION.

1NONLINEAR MIXED EFFECTS MODEL PROGRAM (NONMEM) VERSION 7.1.0
 ORIGINALLY DEVELOPED BY STUART BEAL, LEWIS SHEINER, AND ALISON BOECKMANN
 CURRENT DEVELOPERS ARE ROBERT BAUER, ICON DEVELOPMENT SOLUTIONS,
 AND ALISON BOECKMANN. IMPLEMENTATION, EFFICIENCY, AND STANDARDIZATION
 PERFORMED BY NOUS INFOSYSTEMS.
 PROBLEM NO.:         1
 RUN# Example 1 (from samp5l)
 TOT. NO. OF OBS RECS:      500
 TOT. NO. OF INDIVIDUALS:    100
 TWO COMPARTMENT MODEL (ADVAN3)
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 #METH: Iterative Two Stage (No Prior)
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 Elapsed estimation time in seconds:    11.11

 #TERM:
 OPTIMIZATION COMPLETED


 ETABAR IS THE ARITHMETIC MEAN OF THE ETA-ESTIMATES,
 AND THE P-VALUE IS GIVEN FOR THE NULL HYPOTHESIS THAT THE TRUE MEAN IS 0.

 ETABAR:         5.8026E-07 -5.9289E-07 -8.1749E-07  3.3743E-07
 SE:             3.9118E-02  2.9341E-02  3.5668E-02  3.4352E-02

 P VAL.:         9.9999E-01  9.9998E-01  9.9998E-01  9.9999E-01

 ETAshrink(%):   3.2924E+00  1.9373E+01  2.2486E+01  1.4424E+01
 EPSshrink(%):   3.1728E+01

 #TERE:
 Elapsed covariance time in seconds:     0.09

 ********************                          ITERATIVE TWO STAGE (NO PRIOR)                        ********************
 #OBJT:**************                        FINAL VALUE OF OBJECTIVE FUNCTION                       ********************
 #OBJV:********************************************    -1120.262       **************************************************

 ********************                          ITERATIVE TWO STAGE (NO PRIOR)                        ********************
 ********************                             FINAL PARAMETER ESTIMATE                           ********************

 THETA - VECTOR OF FIXED EFFECTS PARAMETERS   *********
         TH 1      TH 2      TH 3      TH 4
         1.68E+00  1.59E+00  8.13E-01  2.37E+00

 OMEGA - COV MATRIX FOR RANDOM EFFECTS - ETAS  ********
            ETA1      ETA2      ETA3      ETA4
 ETA1
+        1.65E-01
 ETA2
+        4.62E-03  1.34E-01
 ETA3
+        6.35E-03  1.69E-02  2.14E-01
 ETA4
+       -1.53E-02  1.26E-02  5.32E-02  1.63E-01

 SIGMA - COV MATRIX FOR RANDOM EFFECTS - EPSILONS  ****
            EPS1
 EPS1
+        5.45E-02

 ********************                          ITERATIVE TWO STAGE (NO PRIOR)                        ********************
 ********************                          STANDARD ERROR OF ESTIMATE (S)                        ********************

 THETA - VECTOR OF FIXED EFFECTS PARAMETERS   *********
         TH 1      TH 2      TH 3      TH 4
         4.62E-02  4.90E-02  6.53E-02  5.39E-02

 OMEGA - COV MATRIX FOR RANDOM EFFECTS - ETAS  ********
            ETA1      ETA2      ETA3      ETA4
 ETA1
+        2.90E-02
 ETA2
+        2.31E-02  3.49E-02
 ETA3
+        3.25E-02  3.83E-02  6.48E-02
 ETA4
+        2.76E-02  2.73E-02  4.50E-02  4.06E-02

 SIGMA - COV MATRIX FOR RANDOM EFFECTS - EPSILONS  ****
            EPS1
 EPS1
+        7.61E-03

 ********************                          ITERATIVE TWO STAGE (NO PRIOR)                        ********************
 ********************                        COVARIANCE MATRIX OF ESTIMATE (S)                       ********************

            TH 1      TH 2      TH 3      TH 4      OM11      OM12      OM13      OM14      OM22      OM23      OM24      OM33
             OM34      OM44      SG11
 TH 1
+        2.13E-03
 TH 2
+        3.70E-04  2.40E-03
 TH 3
+        3.77E-04  2.21E-04  4.26E-03
 TH 4
+       -1.52E-05  1.67E-04  1.61E-03  2.91E-03
 OM11
+       -2.51E-04  9.51E-05  5.84E-05 -9.67E-05  8.40E-04
 OM12
+        1.09E-05  1.74E-04  2.55E-05 -1.43E-04  3.14E-04  5.35E-04
 OM13
+       -1.72E-04 -8.84E-06 -2.67E-04  2.17E-04  1.44E-04  2.38E-04  1.06E-03
 OM14
+       -1.84E-04 -2.18E-04  1.34E-04  1.63E-04  2.24E-04  1.82E-04  5.47E-04  7.62E-04
 OM22
+       -3.89E-05 -2.28E-05 -2.18E-04 -1.24E-04  1.40E-04  2.40E-04  8.20E-05  1.37E-04  1.22E-03
 OM23
+       -8.28E-05 -8.04E-05  6.23E-05  1.21E-04  1.88E-04  4.05E-05 -6.25E-05 -2.94E-05  2.80E-04  1.47E-03
 OM24
+       -2.62E-04 -1.01E-04  1.32E-04  1.46E-04  1.14E-04  8.62E-05  2.40E-05  9.07E-05  3.78E-04  5.88E-04  7.47E-04
 OM33
+       -3.31E-04 -3.25E-04 -2.60E-04  4.94E-04  2.20E-04  1.45E-04  8.13E-04  3.81E-04  5.41E-04  4.36E-04  4.02E-04  4.20E-03
 OM34
+       -2.35E-05 -8.77E-05  2.28E-04  2.47E-04  2.49E-04  1.15E-04  2.89E-04  2.11E-04  3.75E-04  3.82E-04  3.30E-04  2.18E-03
          2.03E-03
 OM44
+        2.93E-05 -1.97E-05  1.75E-04 -3.14E-04  2.71E-04  1.26E-04  6.08E-05  1.49E-04  3.24E-04  2.03E-04  2.25E-04  1.10E-03
          1.34E-03  1.65E-03
 SG11
+        4.47E-05  6.18E-05 -1.22E-06  3.02E-05 -5.92E-05 -4.22E-05 -5.65E-05 -7.69E-05 -7.90E-05  7.98E-06 -3.98E-05 -9.37E-05
         -1.06E-04 -1.16E-04  5.79E-05

 ********************                          ITERATIVE TWO STAGE (NO PRIOR)                        ********************
 ********************                        CORRELATION MATRIX OF ESTIMATE (S)                      ********************

            TH 1      TH 2      TH 3      TH 4      OM11      OM12      OM13      OM14      OM22      OM23      OM24      OM33
             OM34      OM44      SG11
 TH 1
+        1.00E+00
 TH 2
+        1.63E-01  1.00E+00
 TH 3
+        1.25E-01  6.89E-02  1.00E+00
 TH 4
+       -6.10E-03  6.32E-02  4.58E-01  1.00E+00
 OM11
+       -1.88E-01  6.70E-02  3.09E-02 -6.19E-02  1.00E+00
 OM12
+        1.02E-02  1.54E-01  1.69E-02 -1.15E-01  4.68E-01  1.00E+00
 OM13
+       -1.15E-01 -5.55E-03 -1.26E-01  1.24E-01  1.53E-01  3.17E-01  1.00E+00
 OM14
+       -1.44E-01 -1.61E-01  7.44E-02  1.10E-01  2.80E-01  2.84E-01  6.10E-01  1.00E+00
 OM22
+       -2.41E-02 -1.33E-02 -9.56E-02 -6.57E-02  1.39E-01  2.97E-01  7.23E-02  1.42E-01  1.00E+00
 OM23
+       -4.69E-02 -4.28E-02  2.49E-02  5.85E-02  1.70E-01  4.58E-02 -5.02E-02 -2.78E-02  2.10E-01  1.00E+00
 OM24
+       -2.07E-01 -7.57E-02  7.38E-02  9.90E-02  1.44E-01  1.36E-01  2.70E-02  1.20E-01  3.96E-01  5.62E-01  1.00E+00
 OM33
+       -1.11E-01 -1.02E-01 -6.15E-02  1.41E-01  1.17E-01  9.68E-02  3.86E-01  2.13E-01  2.39E-01  1.76E-01  2.27E-01  1.00E+00
 OM34
+       -1.13E-02 -3.98E-02  7.76E-02  1.02E-01  1.91E-01  1.10E-01  1.98E-01  1.70E-01  2.38E-01  2.21E-01  2.68E-01  7.46E-01
          1.00E+00
 OM44
+        1.56E-02 -9.87E-03  6.58E-02 -1.43E-01  2.30E-01  1.34E-01  4.60E-02  1.33E-01  2.28E-01  1.31E-01  2.02E-01  4.16E-01
          7.32E-01  1.00E+00
 SG11
+        1.27E-01  1.66E-01 -2.46E-03  7.35E-02 -2.69E-01 -2.40E-01 -2.28E-01 -3.66E-01 -2.97E-01  2.74E-02 -1.91E-01 -1.90E-01
         -3.09E-01 -3.74E-01  1.00E+00
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
 ********************                          ITERATIVE TWO STAGE (NO PRIOR)                        ********************
 ********************                    EIGENVALUES OF COR MATRIX OF ESTIMATE (S)                   ********************

             1         2         3         4         5         6         7         8         9        10        11        12
             13        14        15
         1.29E-01  2.52E-01  3.20E-01  3.38E-01  4.49E-01  5.04E-01  6.18E-01  7.73E-01  9.51E-01  1.06E+00  1.37E+00  1.44E+00
          1.57E+00  1.76E+00  3.45E+00
 #METH: Stochastic Approximation Expectation-Maximization (No Prior)
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 Elapsed estimation time in seconds:    40.23

 #TERM:
 STOCHASTIC PORTION COMPLETED
 REDUCED STOCHASTIC PORTION COMPLETED

 ETABAR IS THE ARITHMETIC MEAN OF THE ETA-ESTIMATES,
 AND THE P-VALUE IS GIVEN FOR THE NULL HYPOTHESIS THAT THE TRUE MEAN IS 0.

 ETABAR:        -6.9975E-03 -7.2196E-03 -3.8196E-02 -2.9476E-02
 SE:             3.9351E-02  3.2542E-02  3.7578E-02  3.7272E-02

 P VAL.:         8.5886E-01  8.2443E-01  3.0942E-01  4.2903E-01

 ETAshrink(%):   2.3728E+00  1.1299E+01  1.0629E+01  8.7582E+00
 EPSshrink(%):   1.1376E+01

 #TERE:

 ********************           STOCHASTIC APPROXIMATION EXPECTATION-MAXIMIZATION (NO PRIOR)         ********************
 #OBJT:**************                        FINAL VALUE OF LIKELIHOOD FUNCTION                      ********************
 #OBJV:********************************************    -2494.006       **************************************************

 ********************           STOCHASTIC APPROXIMATION EXPECTATION-MAXIMIZATION (NO PRIOR)         ********************
 ********************                             FINAL PARAMETER ESTIMATE                           ********************

 THETA - VECTOR OF FIXED EFFECTS PARAMETERS   *********
         TH 1      TH 2      TH 3      TH 4
         1.63E+00  1.56E+00  7.37E-01  2.34E+00

 OMEGA - COV MATRIX FOR RANDOM EFFECTS - ETAS  ********
            ETA1      ETA2      ETA3      ETA4
 ETA1
+        1.64E-01
 ETA2
+       -5.85E-03  1.36E-01
 ETA3
+        8.02E-03 -1.36E-02  1.79E-01
 ETA4
+       -1.76E-02  1.50E-02  3.41E-02  1.69E-01

 SIGMA - COV MATRIX FOR RANDOM EFFECTS - EPSILONS  ****
            EPS1
 EPS1
+        5.58E-02
 #METH: Objective Function Evaluation by Importance Sampling (No Prior)
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 Elapsed estimation time in seconds:    11.03

 #TERM:
 OPTIMIZATION NOT TESTED


 ETABAR IS THE ARITHMETIC MEAN OF THE ETA-ESTIMATES,
 AND THE P-VALUE IS GIVEN FOR THE NULL HYPOTHESIS THAT THE TRUE MEAN IS 0.

 ETABAR:         4.8903E-04 -3.5438E-03  3.8175E-03  2.9146E-03
 SE:             3.8973E-02  2.8875E-02  3.0543E-02  3.3917E-02

 P VAL.:         9.8999E-01  9.0232E-01  9.0053E-01  9.3152E-01

 ETAshrink(%):   3.3114E+00  2.1295E+01  2.7362E+01  1.6970E+01
 EPSshrink(%):   2.9940E+01

 #TERE:
 Elapsed covariance time in seconds:    19.11

 ********************         OBJECTIVE FUNCTION EVALUATION BY IMPORTANCE SAMPLING (NO PRIOR)        ********************
 #OBJT:**************                        FINAL VALUE OF OBJECTIVE FUNCTION                       ********************
 #OBJV:********************************************    -1145.366       **************************************************

 ********************         OBJECTIVE FUNCTION EVALUATION BY IMPORTANCE SAMPLING (NO PRIOR)        ********************
 ********************                             FINAL PARAMETER ESTIMATE                           ********************

 THETA - VECTOR OF FIXED EFFECTS PARAMETERS   *********
         TH 1      TH 2      TH 3      TH 4
         1.63E+00  1.56E+00  7.37E-01  2.34E+00

 OMEGA - COV MATRIX FOR RANDOM EFFECTS - ETAS  ********
            ETA1      ETA2      ETA3      ETA4
 ETA1
+        1.64E-01
 ETA2
+       -5.85E-03  1.36E-01
 ETA3
+        8.02E-03 -1.36E-02  1.79E-01
 ETA4
+       -1.76E-02  1.50E-02  3.41E-02  1.69E-01

 SIGMA - COV MATRIX FOR RANDOM EFFECTS - EPSILONS  ****
            EPS1
 EPS1
+        5.58E-02

 ********************         OBJECTIVE FUNCTION EVALUATION BY IMPORTANCE SAMPLING (NO PRIOR)        ********************
 ********************                          STANDARD ERROR OF ESTIMATE (R)                        ********************

 THETA - VECTOR OF FIXED EFFECTS PARAMETERS   *********
         TH 1      TH 2      TH 3      TH 4
         4.30E-02  5.07E-02  6.80E-02  5.35E-02

 OMEGA - COV MATRIX FOR RANDOM EFFECTS - ETAS  ********
            ETA1      ETA2      ETA3      ETA4
 ETA1
+        2.67E-02
 ETA2
+        2.22E-02  3.53E-02
 ETA3
+        2.87E-02  3.89E-02  7.64E-02
 ETA4
+        2.33E-02  2.55E-02  3.86E-02  3.57E-02

 SIGMA - COV MATRIX FOR RANDOM EFFECTS - EPSILONS  ****
            EPS1
 EPS1
+        7.11E-03

 ********************         OBJECTIVE FUNCTION EVALUATION BY IMPORTANCE SAMPLING (NO PRIOR)        ********************
 ********************                        COVARIANCE MATRIX OF ESTIMATE (R)                       ********************

            TH 1      TH 2      TH 3      TH 4      OM11      OM12      OM13      OM14      OM22      OM23      OM24      OM33
             OM34      OM44      SG11
 TH 1
+        1.85E-03
 TH 2
+        2.26E-04  2.57E-03
 TH 3
+        5.03E-04  8.83E-05  4.63E-03
 TH 4
+        1.52E-04  3.72E-04  1.79E-03  2.86E-03
 OM11
+        5.76E-05  1.44E-04  2.00E-04  1.27E-04  7.14E-04
 OM12
+        8.38E-05  1.43E-04  2.51E-04  1.18E-04  1.31E-04  4.94E-04
 OM13
+        6.46E-05  1.57E-04  5.36E-05  1.34E-04  2.42E-04  1.03E-04  8.24E-04
 OM14
+        5.29E-05  1.01E-04  1.78E-04  9.24E-05  1.01E-04  1.30E-04  3.50E-04  5.41E-04
 OM22
+       -7.17E-05 -2.40E-04 -3.56E-04 -1.83E-04 -1.45E-05  6.08E-05  1.12E-05 -4.55E-06  1.24E-03
 OM23
+        1.01E-04  3.27E-04  8.33E-04  1.84E-04  1.53E-04  2.71E-04  1.54E-04  1.22E-04 -1.39E-04  1.52E-03
 OM24
+        7.30E-06 -3.03E-05  2.34E-04  1.60E-04  3.49E-05  6.55E-05  5.68E-05  5.92E-05  1.67E-04  3.96E-04  6.51E-04
 OM33
+        9.43E-05 -2.38E-04  6.22E-04  2.75E-04  3.46E-04  3.36E-04  8.82E-04  4.32E-04  3.35E-04  4.54E-04  2.53E-04  5.84E-03
 OM34
+        4.32E-05 -6.74E-05  1.09E-04 -5.52E-05  1.21E-04  1.48E-04  3.35E-04  2.45E-04  1.30E-04  2.80E-04  1.32E-04  2.16E-03
          1.49E-03
 OM44
+        1.02E-05  3.97E-05 -1.35E-04 -1.93E-05  2.70E-05  5.48E-05  1.24E-04  7.35E-05  1.08E-04  1.15E-04  2.15E-04  6.87E-04
          7.57E-04  1.27E-03
 SG11
+        2.37E-06  2.79E-05 -6.71E-07  1.13E-05 -2.31E-05 -3.07E-05 -4.83E-05 -3.19E-05 -6.59E-05 -3.34E-05 -2.29E-05 -2.64E-04
         -1.20E-04 -6.20E-05  5.06E-05

 ********************         OBJECTIVE FUNCTION EVALUATION BY IMPORTANCE SAMPLING (NO PRIOR)        ********************
 ********************                        CORRELATION MATRIX OF ESTIMATE (R)                      ********************

            TH 1      TH 2      TH 3      TH 4      OM11      OM12      OM13      OM14      OM22      OM23      OM24      OM33
             OM34      OM44      SG11
 TH 1
+        1.00E+00
 TH 2
+        1.04E-01  1.00E+00
 TH 3
+        1.72E-01  2.56E-02  1.00E+00
 TH 4
+        6.59E-02  1.37E-01  4.91E-01  1.00E+00
 OM11
+        5.02E-02  1.06E-01  1.10E-01  8.86E-02  1.00E+00
 OM12
+        8.77E-02  1.27E-01  1.66E-01  9.96E-02  2.21E-01  1.00E+00
 OM13
+        5.24E-02  1.08E-01  2.75E-02  8.73E-02  3.15E-01  1.61E-01  1.00E+00
 OM14
+        5.29E-02  8.61E-02  1.12E-01  7.42E-02  1.63E-01  2.51E-01  5.24E-01  1.00E+00
 OM22
+       -4.73E-02 -1.34E-01 -1.48E-01 -9.68E-02 -1.53E-02  7.76E-02  1.11E-02 -5.54E-03  1.00E+00
 OM23
+        6.05E-02  1.66E-01  3.15E-01  8.84E-02  1.47E-01  3.13E-01  1.38E-01  1.35E-01 -1.01E-01  1.00E+00
 OM24
+        6.65E-03 -2.34E-02  1.35E-01  1.17E-01  5.12E-02  1.16E-01  7.76E-02  9.98E-02  1.86E-01  3.99E-01  1.00E+00
 OM33
+        2.87E-02 -6.15E-02  1.20E-01  6.72E-02  1.70E-01  1.98E-01  4.02E-01  2.43E-01  1.24E-01  1.53E-01  1.30E-01  1.00E+00
 OM34
+        2.60E-02 -3.45E-02  4.16E-02 -2.68E-02  1.18E-01  1.73E-01  3.03E-01  2.73E-01  9.55E-02  1.86E-01  1.34E-01  7.32E-01
          1.00E+00
 OM44
+        6.64E-03  2.20E-02 -5.58E-02 -1.01E-02  2.83E-02  6.91E-02  1.21E-01  8.86E-02  8.61E-02  8.30E-02  2.37E-01  2.52E-01
          5.50E-01  1.00E+00
 SG11
+        7.75E-03  7.73E-02 -1.39E-03  2.97E-02 -1.21E-01 -1.94E-01 -2.36E-01 -1.93E-01 -2.63E-01 -1.21E-01 -1.26E-01 -4.87E-01
         -4.36E-01 -2.44E-01  1.00E+00
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
 ********************         OBJECTIVE FUNCTION EVALUATION BY IMPORTANCE SAMPLING (NO PRIOR)        ********************
 ********************                    EIGENVALUES OF COR MATRIX OF ESTIMATE (R)                   ********************

             1         2         3         4         5         6         7         8         9        10        11        12
             13        14        15
         1.68E-01  3.51E-01  4.27E-01  4.94E-01  5.46E-01  7.04E-01  8.17E-01  8.75E-01  8.90E-01  9.79E-01  1.08E+00  1.14E+00
          1.37E+00  1.94E+00  3.21E+00
 #METH: MCMC Bayesian Analysis (No Prior)
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 Elapsed estimation time in seconds:   122.18

 #TERM:
 BURN-IN COMPLETED
 STATISTICAL PORTION COMPLETED

 #TERE:
 Elapsed covariance time in seconds:     0.00

 ********************                        MCMC BAYESIAN ANALYSIS (NO PRIOR)                       ********************
 #OBJT:**************                       AVERAGE VALUE OF LIKELIHOOD FUNCTION                     ********************
 #OBJV:********************************************    -3250.837       **************************************************
 #OBJS:********************************************      166.138 (STD) **************************************************

 ********************                        MCMC BAYESIAN ANALYSIS (NO PRIOR)                       ********************
 ********************                             FINAL PARAMETER ESTIMATE                           ********************

 THETA - VECTOR OF FIXED EFFECTS PARAMETERS   *********
         TH 1      TH 2      TH 3      TH 4
         1.64E+00  1.59E+00  7.83E-01  2.39E+00

 OMEGA - COV MATRIX FOR RANDOM EFFECTS - ETAS  ********
            ETA1      ETA2      ETA3      ETA4
 ETA1
+        1.89E-01
 ETA2
+        1.97E-03  1.35E-01
 ETA3
+        4.28E-02 -1.89E-04  6.92E-02
 ETA4
+       -1.85E-03  1.23E-02 -6.85E-02  8.35E-02

 SIGMA - COV MATRIX FOR RANDOM EFFECTS - EPSILONS  ****
            EPS1
 EPS1
+        7.74E-02

 ********************                        MCMC BAYESIAN ANALYSIS (NO PRIOR)                       ********************
 ********************                STANDARD ERROR OF ESTIMATE (From Sample Variance)               ********************

 THETA - VECTOR OF FIXED EFFECTS PARAMETERS   *********
         TH 1      TH 2      TH 3      TH 4
         4.54E-02  5.12E-02  3.11E-02  3.43E-02

 OMEGA - COV MATRIX FOR RANDOM EFFECTS - ETAS  ********
            ETA1      ETA2      ETA3      ETA4
 ETA1
+        3.05E-02
 ETA2
+        2.34E-02  3.21E-02
 ETA3
+        1.62E-02  1.81E-02  1.41E-02
 ETA4
+        1.63E-02  1.98E-02  1.38E-02  1.72E-02

 SIGMA - COV MATRIX FOR RANDOM EFFECTS - EPSILONS  ****
            EPS1
 EPS1
+        7.33E-03

 ********************                        MCMC BAYESIAN ANALYSIS (NO PRIOR)                       ********************
 ********************               COVARIANCE MATRIX OF ESTIMATE (From Sample Variance)             ********************

            TH 1      TH 2      TH 3      TH 4      OM11      OM12      OM13      OM14      OM22      OM23      OM24      OM33
             OM34      OM44      SG11
 TH 1
+        2.07E-03
 TH 2
+        3.13E-04  2.62E-03
 TH 3
+        4.33E-04  2.07E-06  9.69E-04
 TH 4
+        5.97E-05  2.10E-04 -7.55E-04  1.17E-03
 OM11
+        1.29E-05  9.28E-05  4.10E-07 -4.77E-06  9.27E-04
 OM12
+        5.15E-05  9.58E-05 -3.89E-05 -1.06E-05  1.17E-04  5.46E-04
 OM13
+       -8.21E-06 -1.57E-05 -1.23E-05  7.28E-05  2.04E-04  1.11E-05  2.63E-04
 OM14
+       -7.18E-06  2.66E-06  5.34E-05 -1.98E-05  3.98E-05  5.36E-05 -1.29E-04  2.65E-04
 OM22
+        2.50E-07 -1.62E-04 -2.31E-05  2.37E-05  4.42E-06  9.00E-05  3.23E-05  3.56E-05  1.03E-03
 OM23
+       -3.32E-06  4.96E-05  5.10E-05 -8.69E-05  4.71E-05  1.31E-04  4.20E-05  6.76E-06 -2.72E-05  3.29E-04
 OM24
+        8.39E-06 -5.97E-05 -1.79E-05  1.35E-04 -1.47E-05 -6.71E-06  1.25E-05  4.64E-05  1.58E-04 -2.95E-04  3.90E-04
 OM33
+       -5.57E-08  1.02E-05 -8.27E-05  3.25E-05  4.96E-05  1.54E-05  6.98E-05 -8.46E-05  2.36E-05 -2.31E-05 -2.83E-06  1.98E-04
 OM34
+        7.61E-07 -2.16E-05  7.50E-05 -5.81E-05 -6.36E-06 -1.12E-06 -5.39E-05  4.59E-05 -3.06E-05  3.86E-05 -3.97E-05 -1.57E-04
          1.91E-04
 OM44
+        1.99E-05  3.54E-05  1.50E-05  1.09E-04  2.62E-06  2.95E-06  5.11E-06  1.07E-05  5.64E-05 -6.29E-05  1.00E-04  1.32E-04
         -1.58E-04  2.97E-04
 SG11
+        1.27E-05  2.17E-05  4.02E-06  1.83E-05 -6.19E-06 -1.68E-05  4.07E-06 -3.30E-06 -2.62E-05 -5.08E-06  1.53E-06 -1.09E-05
          5.46E-06 -1.39E-05  5.38E-05

 ********************                        MCMC BAYESIAN ANALYSIS (NO PRIOR)                       ********************
 ********************              CORRELATION MATRIX OF ESTIMATE (From Sample Variance)             ********************

            TH 1      TH 2      TH 3      TH 4      OM11      OM12      OM13      OM14      OM22      OM23      OM24      OM33
             OM34      OM44      SG11
 TH 1
+        1.00E+00
 TH 2
+        1.34E-01  1.00E+00
 TH 3
+        3.06E-01  1.30E-03  1.00E+00
 TH 4
+        3.83E-02  1.20E-01 -7.08E-01  1.00E+00
 OM11
+        9.29E-03  5.95E-02  4.32E-04 -4.57E-03  1.00E+00
 OM12
+        4.85E-02  8.01E-02 -5.35E-02 -1.33E-02  1.65E-01  1.00E+00
 OM13
+       -1.12E-02 -1.90E-02 -2.43E-02  1.31E-01  4.13E-01  2.93E-02  1.00E+00
 OM14
+       -9.70E-03  3.19E-03  1.05E-01 -3.55E-02  8.03E-02  1.41E-01 -4.88E-01  1.00E+00
 OM22
+        1.71E-04 -9.83E-02 -2.31E-02  2.15E-02  4.51E-03  1.20E-01  6.21E-02  6.80E-02  1.00E+00
 OM23
+       -4.03E-03  5.34E-02  9.04E-02 -1.40E-01  8.53E-02  3.08E-01  1.43E-01  2.29E-02 -4.67E-02  1.00E+00
 OM24
+        9.35E-03 -5.91E-02 -2.92E-02  2.00E-01 -2.45E-02 -1.45E-02  3.90E-02  1.44E-01  2.49E-01 -8.22E-01  1.00E+00
 OM33
+       -8.71E-05  1.41E-02 -1.89E-01  6.74E-02  1.16E-01  4.68E-02  3.06E-01 -3.69E-01  5.22E-02 -9.06E-02 -1.02E-02  1.00E+00
 OM34
+        1.21E-03 -3.06E-02  1.74E-01 -1.23E-01 -1.51E-02 -3.46E-03 -2.41E-01  2.04E-01 -6.90E-02  1.54E-01 -1.45E-01 -8.09E-01
          1.00E+00
 OM44
+        2.53E-02  4.01E-02  2.80E-02  1.84E-01  4.99E-03  7.32E-03  1.83E-02  3.80E-02  1.02E-01 -2.01E-01  2.94E-01  5.44E-01
         -6.63E-01  1.00E+00
 SG11
+        3.81E-02  5.79E-02  1.76E-02  7.30E-02 -2.77E-02 -9.83E-02  3.42E-02 -2.76E-02 -1.11E-01 -3.82E-02  1.05E-02 -1.05E-01
          5.39E-02 -1.10E-01  1.00E+00

 ********************                        MCMC BAYESIAN ANALYSIS (NO PRIOR)                       ********************
 ********************           EIGENVALUES OF COR MATRIX OF ESTIMATE (From Sample Variance)         ********************

             1         2         3         4         5         6         7         8         9        10        11        12
             13        14        15
         4.09E-02  9.33E-02  1.48E-01  3.17E-01  5.08E-01  7.20E-01  7.91E-01  8.81E-01  9.72E-01  1.26E+00  1.32E+00  1.43E+00
          1.66E+00  2.04E+00  2.82E+00
 #METH: First Order Conditional Estimation with Interaction (No Prior)
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 Elapsed estimation time in seconds:     5.21

 #TERM:
0MINIMIZATION SUCCESSFUL
 NO. OF FUNCTION EVALUATIONS USED:      313
 NO. OF SIG. DIGITS IN FINAL EST.:  3.3

 ETABAR IS THE ARITHMETIC MEAN OF THE ETA-ESTIMATES,
 AND THE P-VALUE IS GIVEN FOR THE NULL HYPOTHESIS THAT THE TRUE MEAN IS 0.

 ETABAR:        -3.0874E-06 -1.1915E-02 -3.4880E-03 -1.1591E-02
 SE:             3.9193E-02  2.8850E-02  3.2735E-02  3.3062E-02

 P VAL.:         9.9994E-01  6.7961E-01  9.1514E-01  7.2591E-01

 ETAshrink(%):   3.0464E+00  2.0021E+01  2.4031E+01  1.4177E+01
 EPSshrink(%):   3.0941E+01

 #TERE:
 Elapsed covariance time in seconds:     4.70

 ********************          FIRST ORDER CONDITIONAL ESTIMATION WITH INTERACTION (NO PRIOR)        ********************
 #OBJT:**************                       MINIMUM VALUE OF OBJECTIVE FUNCTION                      ********************
 #OBJV:********************************************    -1121.028       **************************************************

 ********************          FIRST ORDER CONDITIONAL ESTIMATION WITH INTERACTION (NO PRIOR)        ********************
 ********************                             FINAL PARAMETER ESTIMATE                           ********************

 THETA - VECTOR OF FIXED EFFECTS PARAMETERS   *********
         TH 1      TH 2      TH 3      TH 4
         1.69E+00  1.61E+00  8.20E-01  2.39E+00

 OMEGA - COV MATRIX FOR RANDOM EFFECTS - ETAS  ********
            ETA1      ETA2      ETA3      ETA4
 ETA1
+        1.65E-01
 ETA2
+       -7.43E-04  1.31E-01
 ETA3
+        1.24E-02  1.60E-02  1.88E-01
 ETA4
+       -1.27E-02  1.39E-02  3.33E-02  1.50E-01

 SIGMA - COV MATRIX FOR RANDOM EFFECTS - EPSILONS  ****
            EPS1
 EPS1
+        5.72E-02

 ********************          FIRST ORDER CONDITIONAL ESTIMATION WITH INTERACTION (NO PRIOR)        ********************
 ********************                            STANDARD ERROR OF ESTIMATE                          ********************

 THETA - VECTOR OF FIXED EFFECTS PARAMETERS   *********
         TH 1      TH 2      TH 3      TH 4
         4.34E-02  4.79E-02  7.12E-02  5.21E-02

 OMEGA - COV MATRIX FOR RANDOM EFFECTS - ETAS  ********
            ETA1      ETA2      ETA3      ETA4
 ETA1
+        2.70E-02
 ETA2
+        2.35E-02  3.27E-02
 ETA3
+        3.07E-02  3.61E-02  8.20E-02
 ETA4
+        2.36E-02  2.33E-02  4.83E-02  4.10E-02

 SIGMA - COV MATRIX FOR RANDOM EFFECTS - EPSILONS  ****
            EPS1
 EPS1
+        9.44E-03

 ********************          FIRST ORDER CONDITIONAL ESTIMATION WITH INTERACTION (NO PRIOR)        ********************
 ********************                          COVARIANCE MATRIX OF ESTIMATE                         ********************

            TH 1      TH 2      TH 3      TH 4      OM11      OM12      OM13      OM14      OM22      OM23      OM24      OM33
             OM34      OM44      SG11
 TH 1
+        1.88E-03
 TH 2
+        2.67E-04  2.29E-03
 TH 3
+        6.30E-04  2.90E-04  5.07E-03
 TH 4
+        2.74E-04  3.44E-04  2.03E-03  2.72E-03
 OM11
+        7.73E-05  1.42E-04  1.96E-04  1.65E-04  7.27E-04
 OM12
+        7.65E-05  1.28E-04  2.39E-04  1.81E-04  1.53E-04  5.51E-04
 OM13
+        1.12E-04  1.89E-04  7.68E-06  2.11E-04  2.67E-04  2.21E-04  9.41E-04
 OM14
+        9.71E-05  1.37E-04  2.21E-04  2.13E-04  1.38E-04  1.79E-04  4.24E-04  5.58E-04
 OM22
+       -1.07E-05  3.31E-05 -2.94E-04 -7.60E-05  2.18E-05  1.90E-04  1.49E-04  8.21E-05  1.07E-03
 OM23
+        6.98E-05  1.10E-04  8.72E-04  2.54E-04  4.84E-05  1.10E-04 -1.12E-04 -6.51E-06 -1.20E-04  1.31E-03
 OM24
+        3.57E-05 -7.51E-06  3.16E-04  1.85E-04  2.99E-05  6.08E-05  3.74E-05  8.71E-05  1.28E-04  3.35E-04  5.45E-04
 OM33
+        2.52E-04  2.83E-05  7.53E-04  6.88E-04  3.33E-04  6.83E-04  1.18E-03  6.80E-04  6.30E-04 -2.67E-04  1.83E-04  6.72E-03
 OM34
+        1.53E-04  7.22E-05  2.55E-04  3.04E-04  1.86E-04  4.03E-04  6.38E-04  4.53E-04  4.04E-04 -1.87E-04  1.81E-04  3.31E-03
          2.34E-03
 OM44
+        1.03E-04  1.41E-04  6.26E-05  2.18E-04  1.29E-04  2.83E-04  3.95E-04  2.94E-04  3.17E-04 -1.22E-04  2.22E-04  1.80E-03
          1.47E-03  1.68E-03
 SG11
+        8.56E-06  9.73E-06  2.49E-05 -1.33E-05 -3.10E-05 -1.02E-04 -1.00E-04 -6.23E-05 -1.22E-04  6.59E-05 -1.29E-05 -4.85E-04
         -2.87E-04 -2.00E-04  8.91E-05

 ********************          FIRST ORDER CONDITIONAL ESTIMATION WITH INTERACTION (NO PRIOR)        ********************
 ********************                          CORRELATION MATRIX OF ESTIMATE                        ********************

            TH 1      TH 2      TH 3      TH 4      OM11      OM12      OM13      OM14      OM22      OM23      OM24      OM33
             OM34      OM44      SG11
 TH 1
+        1.00E+00
 TH 2
+        1.29E-01  1.00E+00
 TH 3
+        2.04E-01  8.52E-02  1.00E+00
 TH 4
+        1.21E-01  1.38E-01  5.47E-01  1.00E+00
 OM11
+        6.60E-02  1.10E-01  1.02E-01  1.17E-01  1.00E+00
 OM12
+        7.50E-02  1.14E-01  1.43E-01  1.48E-01  2.41E-01  1.00E+00
 OM13
+        8.40E-02  1.29E-01  3.51E-03  1.32E-01  3.23E-01  3.07E-01  1.00E+00
 OM14
+        9.47E-02  1.21E-01  1.31E-01  1.73E-01  2.17E-01  3.23E-01  5.86E-01  1.00E+00
 OM22
+       -7.50E-03  2.12E-02 -1.26E-01 -4.45E-02  2.47E-02  2.47E-01  1.49E-01  1.06E-01  1.00E+00
 OM23
+        4.45E-02  6.38E-02  3.39E-01  1.35E-01  4.97E-02  1.30E-01 -1.01E-01 -7.63E-03 -1.02E-01  1.00E+00
 OM24
+        3.52E-02 -6.72E-03  1.90E-01  1.52E-01  4.75E-02  1.11E-01  5.22E-02  1.58E-01  1.67E-01  3.98E-01  1.00E+00
 OM33
+        7.09E-02  7.20E-03  1.29E-01  1.61E-01  1.51E-01  3.55E-01  4.70E-01  3.51E-01  2.35E-01 -9.01E-02  9.56E-02  1.00E+00
 OM34
+        7.29E-02  3.12E-02  7.40E-02  1.21E-01  1.43E-01  3.55E-01  4.30E-01  3.96E-01  2.56E-01 -1.07E-01  1.61E-01  8.35E-01
          1.00E+00
 OM44
+        5.81E-02  7.19E-02  2.15E-02  1.02E-01  1.17E-01  2.94E-01  3.14E-01  3.04E-01  2.37E-01 -8.24E-02  2.32E-01  5.38E-01
          7.41E-01  1.00E+00
 SG11
+        2.09E-02  2.15E-02  3.70E-02 -2.70E-02 -1.22E-01 -4.62E-01 -3.46E-01 -2.79E-01 -3.93E-01  1.93E-01 -5.87E-02 -6.27E-01
         -6.29E-01 -5.18E-01  1.00E+00
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
 ********************          FIRST ORDER CONDITIONAL ESTIMATION WITH INTERACTION (NO PRIOR)        ********************
 ********************                      EIGENVALUES OF COR MATRIX OF ESTIMATE                     ********************

             1         2         3         4         5         6         7         8         9        10        11        12
             13        14        15
         1.09E-01  3.17E-01  3.28E-01  4.02E-01  4.29E-01  5.22E-01  7.29E-01  7.91E-01  8.58E-01  9.04E-01  9.96E-01  1.12E+00
          1.34E+00  2.06E+00  4.10E+00
