Fri Nov 27 15:19:23 GMT 2009
/opt/intel/fc/9.0/bin/ifc
;Model Desc: Two compartment Model, Using ADVAN3, TRANS4
;Project Name: wexamples
;Project ID: NO PROJECT DESCRIPTION

$PROBLEM RUN# wexample1
$INPUT C SET ID JID TIME  DV AMT RATE EVID MDV CMT
$DATA     wexample1.csv IGNORE=@
$SUBROUTINES ADVAN3 TRANS4
$PK
MU_1=THETA(1)
MU_2=THETA(2)
MU_3=THETA(3)
MU_4=THETA(4)
CL=EXP(MU_1+ETA(1))
V1=EXP(MU_2+ETA(2))
Q=EXP(MU_3+ETA(3))
V2=EXP(MU_4+ETA(4))
S1=V1

$ERROR
Y = F + F*EPS(1)

; Initial values of THETA
$THETA
(0.001, 2.0) ;[LN(CL)]
(0.001, 2.0) ;[LN(V1)]
(0.001, 2.0) ;[LN(Q)]
(0.001, 2.0) ;[LN(V2)]
;INITIAL values of OMEGA
$OMEGA BLOCK(4)
0.4   ;[P]
0.001  ;[F]
0.4   ;[P]
0.001  ;[F]
0.001  ;[F]
0.4   ;[P]
0.001  ;[F]
0.001  ;[F]
0.001  ;[F]
0.4   ;[P]
;Initial value of SIGMA
$SIGMA
(0.6 )   ;[P]

$EST METHOD=ITS INTERACTION FILE=wexample1.EXT CTYPE=3
     NITER=1000 PRINT=5 NOABORT MSFO=wexample1.MSF NSIG=3 SIGL=6
$EST METHOD=SAEM NBURN=2000 NITER=500 PRINT=100
$EST METHOD=IMP EONLY=1 NITER=5 ISAMPLE=3000 PRINT=1
$EST METHOD=COND INTERACTION MAXEVAL=9999 NSIG=2 SIGL=10 PRINT=5 FILE=wexample1.EXT
$COV MATRIX=R
$TABLE ID TIME DV PRED RES WRES CPRED CWRES EPRED ERES EWRES NOAPPEND ONEHEADER
 FILE=wexample1.TAB NOPRINT
$TABLE ID CL V1 Q V2 FIRSTONLY NOAPPEND NOPRINT FILE=wexample1.PAR
$TABLE ID ETA1 ETA2 ETA3 ETA4 FIRSTONLY NOAPPEND NOPRINT FILE=wexample1.ETA

 WARNINGS AND ERRORS (IF ANY) FOR PROBLEM    1
 (WARNING  2) NM-TRAN INFERS THAT THE DATA ARE POPULATION.

1NONLINEAR MIXED EFFECTS MODEL PROGRAM (NONMEM) VERSION 7.1.0
 ORIGINALLY DEVELOPED BY STUART BEAL, LEWIS SHEINER, AND ALISON BOECKMANN
 CURRENT DEVELOPERS ARE ROBERT BAUER, ICON DEVELOPMENT SOLUTIONS,
 AND ALISON BOECKMANN. IMPLEMENTATION, EFFICIENCY, AND STANDARDIZATION
 PERFORMED BY NOUS INFOSYSTEMS.
 PROBLEM NO.:         1
 RUN# wexample1
 TOT. NO. OF OBS RECS:      500
 TOT. NO. OF INDIVIDUALS:    100
 TWO COMPARTMENT MODEL (ADVAN3)
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 #METH: Iterative Two Stage
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 Elapsed estimation time in seconds:    10.84

 #TERM:
 OPTIMIZATION COMPLETED


 ETABAR IS THE ARITHMETIC MEAN OF THE ETA-ESTIMATES,
 AND THE P-VALUE IS GIVEN FOR THE NULL HYPOTHESIS THAT THE TRUE MEAN IS 0.

 ETABAR:         4.1783E-08  2.5281E-08  2.2517E-08  1.3946E-08
 SE:             3.9054E-02  2.9143E-02  3.5180E-02  3.4116E-02

 P VAL.:         1.0000E+00  1.0000E+00  1.0000E+00  1.0000E+00

 ETAshrink(%):   3.3135E+00  1.9596E+01  2.2806E+01  1.4537E+01
 EPSshrink(%):   3.1694E+01


 #TERE:
 Elapsed covariance time in seconds:     0.05

 ********************                               ITERATIVE TWO STAGE                              ********************
 #OBJT:**************                        FINAL VALUE OF OBJECTIVE FUNCTION                       ********************
 #OBJV:********************************************    -1120.307       **************************************************

 ********************                               ITERATIVE TWO STAGE                              ********************
 ********************                             FINAL PARAMETER ESTIMATE                           ********************

 THETA - VECTOR OF FIXED EFFECTS PARAMETERS   *********
         TH 1      TH 2      TH 3      TH 4
         1.68E+00  1.59E+00  8.13E-01  2.37E+00

 OMEGA - COV MATRIX FOR RANDOM EFFECTS - ETAS  ********
            ETA1      ETA2      ETA3      ETA4
 ETA1
+        1.65E-01
 ETA2
+        4.13E-03  1.33E-01
 ETA3
+        5.38E-03  1.72E-02  2.10E-01
 ETA4
+       -1.61E-02  1.23E-02  5.08E-02  1.61E-01

 SIGMA - COV MATRIX FOR RANDOM EFFECTS - EPSILONS  ****
            EPS1
 EPS1
+        5.53E-02

 ********************                               ITERATIVE TWO STAGE                              ********************
 ********************                          STANDARD ERROR OF ESTIMATE (S)                        ********************

 THETA - VECTOR OF FIXED EFFECTS PARAMETERS   *********
         TH 1      TH 2      TH 3      TH 4
         4.61E-02  4.90E-02  6.52E-02  5.39E-02

 OMEGA - COV MATRIX FOR RANDOM EFFECTS - ETAS  ********
            ETA1      ETA2      ETA3      ETA4
 ETA1
+        2.89E-02
 ETA2
+        2.31E-02  3.48E-02
 ETA3
+        3.24E-02  3.82E-02  6.49E-02
 ETA4
+        2.76E-02  2.73E-02  4.51E-02  4.05E-02

 SIGMA - COV MATRIX FOR RANDOM EFFECTS - EPSILONS  ****
            EPS1
 EPS1
+        7.72E-03

 ********************                               ITERATIVE TWO STAGE                              ********************
 ********************                        COVARIANCE MATRIX OF ESTIMATE (S)                       ********************

            TH 1      TH 2      TH 3      TH 4      OM11      OM12      OM13      OM14      OM22      OM23      OM24      OM33
             OM34      OM44      SG11
 TH 1
+        2.13E-03
 TH 2
+        3.66E-04  2.40E-03
 TH 3
+        3.64E-04  2.18E-04  4.25E-03
 TH 4
+       -2.55E-05  1.60E-04  1.61E-03  2.91E-03
 OM11
+       -2.46E-04  9.76E-05  7.27E-05 -8.56E-05  8.37E-04
 OM12
+        1.38E-05  1.77E-04  3.65E-05 -1.34E-04  3.11E-04  5.33E-04
 OM13
+       -1.66E-04 -1.41E-06 -2.52E-04  2.27E-04  1.41E-04  2.40E-04  1.05E-03
 OM14
+       -1.79E-04 -2.14E-04  1.49E-04  1.76E-04  2.22E-04  1.82E-04  5.45E-04  7.64E-04
 OM22
+       -3.84E-05 -1.99E-05 -2.09E-04 -1.13E-04  1.40E-04  2.37E-04  8.43E-05  1.39E-04  1.21E-03
 OM23
+       -7.76E-05 -8.97E-05  6.47E-05  1.26E-04  1.88E-04  3.92E-05 -6.21E-05 -3.03E-05  2.81E-04  1.46E-03
 OM24
+       -2.59E-04 -1.03E-04  1.42E-04  1.55E-04  1.15E-04  8.62E-05  2.30E-05  9.12E-05  3.79E-04  5.84E-04  7.47E-04
 OM33
+       -3.25E-04 -3.28E-04 -1.99E-04  5.31E-04  2.23E-04  1.48E-04  8.08E-04  3.88E-04  5.47E-04  4.35E-04  4.05E-04  4.21E-03
 OM34
+       -2.06E-05 -9.04E-05  2.63E-04  2.74E-04  2.52E-04  1.17E-04  2.93E-04  2.20E-04  3.80E-04  3.73E-04  3.34E-04  2.20E-03
          2.04E-03
 OM44
+        3.13E-05 -1.72E-05  1.96E-04 -2.92E-04  2.72E-04  1.27E-04  6.60E-05  1.56E-04  3.27E-04  1.96E-04  2.28E-04  1.11E-03
          1.34E-03  1.64E-03
 SG11
+        4.53E-05  6.21E-05 -4.89E-06  2.71E-05 -6.00E-05 -4.28E-05 -5.80E-05 -7.91E-05 -8.04E-05  8.12E-06 -4.10E-05 -1.00E-04
         -1.11E-04 -1.19E-04  5.96E-05

 ********************                               ITERATIVE TWO STAGE                              ********************
 ********************                        CORRELATION MATRIX OF ESTIMATE (S)                      ********************

            TH 1      TH 2      TH 3      TH 4      OM11      OM12      OM13      OM14      OM22      OM23      OM24      OM33
             OM34      OM44      SG11
 TH 1
+        1.00E+00
 TH 2
+        1.62E-01  1.00E+00
 TH 3
+        1.21E-01  6.83E-02  1.00E+00
 TH 4
+       -1.02E-02  6.06E-02  4.58E-01  1.00E+00
 OM11
+       -1.84E-01  6.89E-02  3.86E-02 -5.49E-02  1.00E+00
 OM12
+        1.29E-02  1.56E-01  2.43E-02 -1.07E-01  4.66E-01  1.00E+00
 OM13
+       -1.11E-01 -8.87E-04 -1.19E-01  1.30E-01  1.51E-01  3.21E-01  1.00E+00
 OM14
+       -1.40E-01 -1.58E-01  8.29E-02  1.18E-01  2.78E-01  2.85E-01  6.09E-01  1.00E+00
 OM22
+       -2.39E-02 -1.16E-02 -9.22E-02 -6.00E-02  1.38E-01  2.94E-01  7.48E-02  1.45E-01  1.00E+00
 OM23
+       -4.41E-02 -4.80E-02  2.60E-02  6.12E-02  1.70E-01  4.45E-02 -5.03E-02 -2.88E-02  2.11E-01  1.00E+00
 OM24
+       -2.06E-01 -7.68E-02  7.98E-02  1.05E-01  1.46E-01  1.37E-01  2.60E-02  1.21E-01  3.98E-01  5.60E-01  1.00E+00
 OM33
+       -1.09E-01 -1.03E-01 -4.71E-02  1.52E-01  1.19E-01  9.90E-02  3.85E-01  2.17E-01  2.42E-01  1.76E-01  2.29E-01  1.00E+00
 OM34
+       -9.92E-03 -4.09E-02  8.96E-02  1.12E-01  1.93E-01  1.12E-01  2.01E-01  1.76E-01  2.42E-01  2.16E-01  2.71E-01  7.50E-01
          1.00E+00
 OM44
+        1.67E-02 -8.64E-03  7.43E-02 -1.34E-01  2.31E-01  1.35E-01  5.03E-02  1.39E-01  2.31E-01  1.26E-01  2.06E-01  4.22E-01
          7.32E-01  1.00E+00
 SG11
+        1.27E-01  1.64E-01 -9.73E-03  6.50E-02 -2.69E-01 -2.40E-01 -2.32E-01 -3.71E-01 -2.99E-01  2.76E-02 -1.94E-01 -2.01E-01
         -3.19E-01 -3.80E-01  1.00E+00
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 #METH: Stochastic Approximation Expectation-Maximization
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 Elapsed estimation time in seconds:    53.26

 #TERM:
 STOCHASTIC PORTION COMPLETED
 REDUCED STOCHASTIC PORTION COMPLETED

 ETABAR IS THE ARITHMETIC MEAN OF THE ETA-ESTIMATES,
 AND THE P-VALUE IS GIVEN FOR THE NULL HYPOTHESIS THAT THE TRUE MEAN IS 0.

 ETABAR:        -3.4801E-03  7.7771E-04  1.5348E-02  2.2393E-03
 SE:             3.8200E-02  3.3284E-02  3.8123E-02  3.6832E-02

 P VAL.:         9.2741E-01  9.8136E-01  6.8724E-01  9.5152E-01

 ETAshrink(%):   4.8448E+00  1.2521E+01  1.3033E+01  6.0913E+00
 EPSshrink(%):   1.3837E+01


 #TERE:

 ********************                STOCHASTIC APPROXIMATION EXPECTATION-MAXIMIZATION               ********************
 #OBJT:**************                        FINAL VALUE OF LIKELIHOOD FUNCTION                      ********************
 #OBJV:********************************************    -2477.443       **************************************************

 ********************                STOCHASTIC APPROXIMATION EXPECTATION-MAXIMIZATION               ********************
 ********************                             FINAL PARAMETER ESTIMATE                           ********************

 THETA - VECTOR OF FIXED EFFECTS PARAMETERS   *********
         TH 1      TH 2      TH 3      TH 4
         1.63E+00  1.56E+00  7.67E-01  2.35E+00

 OMEGA - COV MATRIX FOR RANDOM EFFECTS - ETAS  ********
            ETA1      ETA2      ETA3      ETA4
 ETA1
+        1.63E-01
 ETA2
+        2.39E-03  1.46E-01
 ETA3
+        5.43E-03  2.83E-02  1.94E-01
 ETA4
+       -2.14E-02  2.81E-02  3.04E-02  1.55E-01

 SIGMA - COV MATRIX FOR RANDOM EFFECTS - EPSILONS  ****
            EPS1
 EPS1
+        5.80E-02
 #METH: Objective Function Evaluation by Importance Sampling
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 Elapsed estimation time in seconds:    14.56

 #TERM:
 OPTIMIZATION NOT TESTED


 ETABAR IS THE ARITHMETIC MEAN OF THE ETA-ESTIMATES,
 AND THE P-VALUE IS GIVEN FOR THE NULL HYPOTHESIS THAT THE TRUE MEAN IS 0.

 ETABAR:         2.4916E-03  1.8841E-03 -2.4374E-03  1.6906E-03
 SE:             3.8862E-02  2.8906E-02  3.1573E-02  3.2690E-02

 P VAL.:         9.4888E-01  9.4803E-01  9.3847E-01  9.5875E-01

 ETAshrink(%):   3.1966E+00  2.4028E+01  2.7974E+01  1.6653E+01
 EPSshrink(%):   3.1306E+01


 #TERE:
 Elapsed covariance time in seconds:    23.97

 ********************               OBJECTIVE FUNCTION EVALUATION BY IMPORTANCE SAMPLING             ********************
 #OBJT:**************                        FINAL VALUE OF OBJECTIVE FUNCTION                       ********************
 #OBJV:********************************************    -1145.163       **************************************************

 ********************               OBJECTIVE FUNCTION EVALUATION BY IMPORTANCE SAMPLING             ********************
 ********************                             FINAL PARAMETER ESTIMATE                           ********************

 THETA - VECTOR OF FIXED EFFECTS PARAMETERS   *********
         TH 1      TH 2      TH 3      TH 4
         1.63E+00  1.56E+00  7.67E-01  2.35E+00

 OMEGA - COV MATRIX FOR RANDOM EFFECTS - ETAS  ********
            ETA1      ETA2      ETA3      ETA4
 ETA1
+        1.63E-01
 ETA2
+        2.39E-03  1.46E-01
 ETA3
+        5.43E-03  2.83E-02  1.94E-01
 ETA4
+       -2.14E-02  2.81E-02  3.04E-02  1.55E-01

 SIGMA - COV MATRIX FOR RANDOM EFFECTS - EPSILONS  ****
            EPS1
 EPS1
+        5.80E-02

 ********************               OBJECTIVE FUNCTION EVALUATION BY IMPORTANCE SAMPLING             ********************
 ********************                          STANDARD ERROR OF ESTIMATE (R)                        ********************

 THETA - VECTOR OF FIXED EFFECTS PARAMETERS   *********
         TH 1      TH 2      TH 3      TH 4
         4.29E-02  5.20E-02  6.91E-02  5.21E-02

 OMEGA - COV MATRIX FOR RANDOM EFFECTS - ETAS  ********
            ETA1      ETA2      ETA3      ETA4
 ETA1
+        2.68E-02
 ETA2
+        2.20E-02  3.52E-02
 ETA3
+        2.92E-02  3.67E-02  5.95E-02
 ETA4
+        2.34E-02  2.52E-02  3.62E-02  3.79E-02

 SIGMA - COV MATRIX FOR RANDOM EFFECTS - EPSILONS  ****
            EPS1
 EPS1
+        7.58E-03

 ********************               OBJECTIVE FUNCTION EVALUATION BY IMPORTANCE SAMPLING             ********************
 ********************                        COVARIANCE MATRIX OF ESTIMATE (R)                       ********************

            TH 1      TH 2      TH 3      TH 4      OM11      OM12      OM13      OM14      OM22      OM23      OM24      OM33
             OM34      OM44      SG11
 TH 1
+        1.84E-03
 TH 2
+        3.21E-04  2.70E-03
 TH 3
+        4.50E-04  5.18E-04  4.77E-03
 TH 4
+        1.21E-04  5.48E-04  1.76E-03  2.72E-03
 OM11
+        4.85E-05  1.42E-04  9.65E-05  1.12E-04  7.17E-04
 OM12
+        6.22E-05  1.52E-04  2.05E-04  1.19E-04  1.34E-04  4.86E-04
 OM13
+        7.38E-05  1.40E-04 -1.41E-04  9.17E-05  2.34E-04  1.16E-04  8.55E-04
 OM14
+        5.76E-05  9.98E-05  7.73E-05  8.43E-05  1.09E-04  1.25E-04  3.67E-04  5.49E-04
 OM22
+       -8.31E-05 -2.66E-04 -5.61E-04 -2.59E-04 -4.23E-05  9.63E-06  6.17E-06  3.46E-06  1.24E-03
 OM23
+        4.07E-05  2.54E-04  7.04E-04  1.56E-04 -3.50E-05  1.72E-04 -1.09E-04 -4.83E-05 -2.08E-04  1.35E-03
 OM24
+       -7.17E-06 -3.23E-05  2.04E-04  1.26E-04 -2.96E-05  2.22E-05 -3.59E-05  3.00E-05  1.30E-04  3.54E-04  6.35E-04
 OM33
+        1.58E-05 -2.65E-04 -6.28E-05  3.67E-05  1.62E-04 -2.05E-07  5.86E-04  3.20E-04  2.99E-05 -3.42E-04 -1.03E-04  3.54E-03
 OM34
+        1.34E-05 -9.64E-05 -2.52E-04 -1.32E-04  9.06E-05  4.02E-06  2.70E-04  2.38E-04  1.08E-04 -1.88E-04  4.30E-05  1.40E-03
          1.31E-03
 OM44
+        5.52E-06  1.16E-05 -3.73E-04 -5.40E-05  7.43E-05 -1.27E-05  1.86E-04  1.43E-04  1.71E-04 -2.57E-04  1.59E-04  6.25E-04
          8.46E-04  1.44E-03
 SG11
+        9.01E-06  4.34E-05  7.31E-05  2.76E-05 -2.39E-05 -2.41E-06 -5.32E-05 -4.14E-05 -6.57E-05  7.56E-05  1.05E-05 -1.89E-04
         -1.17E-04 -1.04E-04  5.75E-05

 ********************               OBJECTIVE FUNCTION EVALUATION BY IMPORTANCE SAMPLING             ********************
 ********************                        CORRELATION MATRIX OF ESTIMATE (R)                      ********************

            TH 1      TH 2      TH 3      TH 4      OM11      OM12      OM13      OM14      OM22      OM23      OM24      OM33
             OM34      OM44      SG11
 TH 1
+        1.00E+00
 TH 2
+        1.44E-01  1.00E+00
 TH 3
+        1.52E-01  1.44E-01  1.00E+00
 TH 4
+        5.40E-02  2.02E-01  4.88E-01  1.00E+00
 OM11
+        4.22E-02  1.02E-01  5.22E-02  8.02E-02  1.00E+00
 OM12
+        6.58E-02  1.33E-01  1.34E-01  1.04E-01  2.26E-01  1.00E+00
 OM13
+        5.88E-02  9.24E-02 -6.96E-02  6.01E-02  2.98E-01  1.80E-01  1.00E+00
 OM14
+        5.73E-02  8.19E-02  4.77E-02  6.90E-02  1.73E-01  2.41E-01  5.35E-01  1.00E+00
 OM22
+       -5.50E-02 -1.45E-01 -2.31E-01 -1.41E-01 -4.48E-02  1.24E-02  5.99E-03  4.20E-03  1.00E+00
 OM23
+        2.58E-02  1.33E-01  2.78E-01  8.15E-02 -3.57E-02  2.13E-01 -1.01E-01 -5.61E-02 -1.61E-01  1.00E+00
 OM24
+       -6.64E-03 -2.47E-02  1.17E-01  9.59E-02 -4.38E-02  3.99E-02 -4.87E-02  5.09E-02  1.47E-01  3.83E-01  1.00E+00
 OM33
+        6.19E-03 -8.58E-02 -1.53E-02  1.19E-02  1.02E-01 -1.56E-04  3.37E-01  2.30E-01  1.43E-02 -1.57E-01 -6.87E-02  1.00E+00
 OM34
+        8.63E-03 -5.12E-02 -1.01E-01 -6.96E-02  9.33E-02  5.03E-03  2.54E-01  2.80E-01  8.45E-02 -1.41E-01  4.71E-02  6.51E-01
          1.00E+00
 OM44
+        3.39E-03  5.87E-03 -1.42E-01 -2.73E-02  7.32E-02 -1.52E-02  1.68E-01  1.61E-01  1.28E-01 -1.85E-01  1.67E-01  2.77E-01
          6.16E-01  1.00E+00
 SG11
+        2.77E-02  1.10E-01  1.39E-01  6.99E-02 -1.18E-01 -1.44E-02 -2.40E-01 -2.33E-01 -2.46E-01  2.72E-01  5.48E-02 -4.20E-01
         -4.24E-01 -3.63E-01  1.00E+00
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 #METH: First Order Conditional Estimation with Interaction
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 Elapsed estimation time in seconds:     5.32

 #TERM:
0MINIMIZATION SUCCESSFUL
 NO. OF FUNCTION EVALUATIONS USED:      210
 NO. OF SIG. DIGITS IN FINAL EST.:  2.4

 ETABAR IS THE ARITHMETIC MEAN OF THE ETA-ESTIMATES,
 AND THE P-VALUE IS GIVEN FOR THE NULL HYPOTHESIS THAT THE TRUE MEAN IS 0.

 ETABAR:         2.7205E-05 -1.1907E-02 -3.4492E-03 -1.1539E-02
 SE:             3.9191E-02  2.8851E-02  3.2729E-02  3.3061E-02

 P VAL.:         9.9945E-01  6.7982E-01  9.1607E-01  7.2707E-01

 ETAshrink(%):   3.0458E+00  2.0019E+01  2.4034E+01  1.4177E+01
 EPSshrink(%):   3.0940E+01


 #TERE:
 Elapsed covariance time in seconds:     6.57

 ********************               FIRST ORDER CONDITIONAL ESTIMATION WITH INTERACTION              ********************
 #OBJT:**************                       MINIMUM VALUE OF OBJECTIVE FUNCTION                      ********************
 #OBJV:********************************************    -1121.028       **************************************************

 ********************               FIRST ORDER CONDITIONAL ESTIMATION WITH INTERACTION              ********************
 ********************                             FINAL PARAMETER ESTIMATE                           ********************

 THETA - VECTOR OF FIXED EFFECTS PARAMETERS   *********
         TH 1      TH 2      TH 3      TH 4
         1.69E+00  1.61E+00  8.19E-01  2.39E+00

 OMEGA - COV MATRIX FOR RANDOM EFFECTS - ETAS  ********
            ETA1      ETA2      ETA3      ETA4
 ETA1
+        1.65E-01
 ETA2
+       -7.52E-04  1.31E-01
 ETA3
+        1.24E-02  1.59E-02  1.88E-01
 ETA4
+       -1.28E-02  1.39E-02  3.33E-02  1.50E-01

 SIGMA - COV MATRIX FOR RANDOM EFFECTS - EPSILONS  ****
            EPS1
 EPS1
+        5.72E-02

 ********************               FIRST ORDER CONDITIONAL ESTIMATION WITH INTERACTION              ********************
 ********************                            STANDARD ERROR OF ESTIMATE                          ********************

 THETA - VECTOR OF FIXED EFFECTS PARAMETERS   *********
         TH 1      TH 2      TH 3      TH 4
         4.32E-02  4.78E-02  7.04E-02  5.18E-02

 OMEGA - COV MATRIX FOR RANDOM EFFECTS - ETAS  ********
            ETA1      ETA2      ETA3      ETA4
 ETA1
+        2.70E-02
 ETA2
+        2.13E-02  3.14E-02
 ETA3
+        3.04E-02  3.54E-02  7.80E-02
 ETA4
+        2.38E-02  2.35E-02  4.61E-02  3.96E-02

 SIGMA - COV MATRIX FOR RANDOM EFFECTS - EPSILONS  ****
            EPS1
 EPS1
+        8.20E-03

 ********************               FIRST ORDER CONDITIONAL ESTIMATION WITH INTERACTION              ********************
 ********************                          COVARIANCE MATRIX OF ESTIMATE                         ********************

            TH 1      TH 2      TH 3      TH 4      OM11      OM12      OM13      OM14      OM22      OM23      OM24      OM33
             OM34      OM44      SG11
 TH 1
+        1.87E-03
 TH 2
+        2.47E-04  2.29E-03
 TH 3
+        5.82E-04  2.42E-04  4.95E-03
 TH 4
+        2.45E-04  3.29E-04  1.97E-03  2.68E-03
 OM11
+        7.37E-05  1.38E-04  1.99E-04  1.63E-04  7.32E-04
 OM12
+        7.94E-05  1.30E-04  2.58E-04  1.69E-04  1.35E-04  4.52E-04
 OM13
+        1.11E-04  1.85E-04  3.41E-05  2.11E-04  2.72E-04  1.52E-04  9.25E-04
 OM14
+        9.32E-05  1.31E-04  2.32E-04  2.12E-04  1.45E-04  1.40E-04  4.26E-04  5.67E-04
 OM22
+       -4.87E-06  3.48E-05 -2.53E-04 -7.62E-05  1.53E-05  8.94E-05  1.02E-04  6.31E-05  9.87E-04
 OM23
+        5.76E-05  9.83E-05  8.31E-04  2.48E-04  5.97E-05  1.68E-04 -6.23E-05  2.07E-05 -5.27E-05  1.26E-03
 OM24
+        3.10E-05 -1.43E-05  3.11E-04  1.82E-04  3.54E-05  5.43E-05  5.03E-05  9.77E-05  1.36E-04  3.35E-04  5.50E-04
 OM33
+        2.52E-04  7.04E-06  8.83E-04  6.79E-04  3.42E-04  3.26E-04  1.08E-03  6.67E-04  3.73E-04 -1.99E-05  2.40E-04  6.09E-03
 OM34
+        1.54E-04  6.08E-05  3.35E-04  3.01E-04  1.92E-04  1.93E-04  5.77E-04  4.46E-04  2.53E-04 -4.08E-05  2.15E-04  2.94E-03
          2.12E-03
 OM44
+        1.04E-04  1.34E-04  1.18E-04  2.16E-04  1.33E-04  1.35E-04  3.52E-04  2.89E-04  2.12E-04 -2.02E-05  2.46E-04  1.55E-03
          1.32E-03  1.57E-03
 SG11
+        6.81E-06  1.23E-05 -3.18E-06 -1.40E-05 -3.24E-05 -3.59E-05 -8.07E-05 -5.97E-05 -7.38E-05  2.01E-05 -2.36E-05 -3.68E-04
         -2.18E-04 -1.52E-04  6.72E-05

 ********************               FIRST ORDER CONDITIONAL ESTIMATION WITH INTERACTION              ********************
 ********************                          CORRELATION MATRIX OF ESTIMATE                        ********************

            TH 1      TH 2      TH 3      TH 4      OM11      OM12      OM13      OM14      OM22      OM23      OM24      OM33
             OM34      OM44      SG11
 TH 1
+        1.00E+00
 TH 2
+        1.19E-01  1.00E+00
 TH 3
+        1.91E-01  7.18E-02  1.00E+00
 TH 4
+        1.10E-01  1.33E-01  5.40E-01  1.00E+00
 OM11
+        6.30E-02  1.07E-01  1.04E-01  1.17E-01  1.00E+00
 OM12
+        8.63E-02  1.28E-01  1.72E-01  1.53E-01  2.34E-01  1.00E+00
 OM13
+        8.42E-02  1.27E-01  1.59E-02  1.34E-01  3.30E-01  2.35E-01  1.00E+00
 OM14
+        9.06E-02  1.15E-01  1.39E-01  1.72E-01  2.25E-01  2.77E-01  5.88E-01  1.00E+00
 OM22
+       -3.59E-03  2.31E-02 -1.14E-01 -4.69E-02  1.79E-02  1.34E-01  1.06E-01  8.43E-02  1.00E+00
 OM23
+        3.76E-02  5.80E-02  3.33E-01  1.35E-01  6.23E-02  2.23E-01 -5.78E-02  2.45E-02 -4.74E-02  1.00E+00
 OM24
+        3.06E-02 -1.27E-02  1.88E-01  1.50E-01  5.58E-02  1.09E-01  7.06E-02  1.75E-01  1.84E-01  4.03E-01  1.00E+00
 OM33
+        7.48E-02  1.89E-03  1.61E-01  1.68E-01  1.62E-01  1.96E-01  4.54E-01  3.59E-01  1.52E-01 -7.21E-03  1.31E-01  1.00E+00
 OM34
+        7.75E-02  2.76E-02  1.03E-01  1.26E-01  1.54E-01  1.97E-01  4.12E-01  4.06E-01  1.75E-01 -2.50E-02  1.99E-01  8.19E-01
          1.00E+00
 OM44
+        6.07E-02  7.05E-02  4.23E-02  1.05E-01  1.24E-01  1.60E-01  2.92E-01  3.06E-01  1.70E-01 -1.44E-02  2.64E-01  5.00E-01
          7.21E-01  1.00E+00
 SG11
+        1.92E-02  3.15E-02 -5.50E-03 -3.30E-02 -1.46E-01 -2.06E-01 -3.24E-01 -3.06E-01 -2.87E-01  6.91E-02 -1.23E-01 -5.76E-01
         -5.78E-01 -4.68E-01  1.00E+00
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