Thu Dec 10 16:11:51 GMT 2009
/opt/intel/fc/9.0/bin/ifc
;Model Desc: Two Compartment model with Clearance and central volume modeled with covariates age and gender
;Project Name: wexamples
;Project ID: NO PROJECT DESCRIPTION

$PROB RUN# wexample2 example
$INPUT C SET ID JID TIME DV=CONC AMT=DOSE RATE EVID MDV CMT GNDR AGE
$DATA wexample2.csv IGNORE=C
$SUBROUTINES ADVAN3 TRANS4

$PK
; LCLM=log transformed clearance, male
LCLM=THETA(1)
;LCLF=log transformed clearance, female.
LCLF=THETA(2)
; CLAM=CL age slope, male
CLAM=THETA(3)
; CLAF=CL age slope, female
CLAF=THETA(4)
; LV1M=log transformed V1, male
LV1M=THETA(5)
; LV1F=log transformed V1, female
LV1F=THETA(6)
; V1AM=V1 age slope, male
V1AM=THETA(7)
; V1AF=V1 age slope, female
V1AF=THETA(8)
; LAGE=log transformed age
LAGE=DLOG(AGE)
;Mean of ETA1, the inter-subject deviation of Clearance, is ultimately modeled as linear function
;of THETA(1) to THETA(4).  Relating thetas to Mus by linear functions is not essential for ITS,
;IMP, or IMPMAP methods, but is very helpful for MCMC methods such as SAEM and BAYES.
MU_1=(1.0-GNDR)*(LCLM+LAGE*CLAM) + GNDR*(LCLF+LAGE*CLAF)
;Mean of ETA2, the inter-subject deviation of V1, is ultimately modeled as linear function of
; THETA(5) to THETA(8)
MU_2=(1.0-GNDR)*(LV1M+LAGE*V1AM) + GNDR*(LV1F+LAGE*V1AF)
MU_3=THETA(9)
MU_4=THETA(10)
CL=DEXP(MU_1+ETA(1))
V1=DEXP(MU_2+ETA(2))
Q=DEXP(MU_3+ETA(3))
V2=DEXP(MU_4+ETA(4))
S1=V1

$ERROR
CALLFL=0
; Option to model the residual error coefficient in THETA(11), rather than in SIGMA.
SDSL=THETA(11)
W=F*SDSL
Y = F + W*EPS(1)
IPRED=F
IWRES=(DV-F)/W

;Initial THETAs
$THETA
( 0.7 ) ;[LCLM]
( 0.7 ) ;[LCLF]
( 2 )   ;[CLAM]
( 2.0)  ;[CLAF]
( 0.7 ) ;[LV1M]
( 0.7 ) ;[LV1F]
( 2.0 ) ;[V1AM]
( 2.0 ) ;[V1AF]
( 0.7 ) ;[MU_3]
(  0.7 );[MU_4]
( 0.3 ) ;[SDSL]

;Initial OMEGAs
$OMEGA BLOCK(4)
0.5    ;[p]
0.001  ;[f]
0.5    ;[p]
0.001  ;[f]
0.001  ;[f]
0.5    ;[p]
0.001  ;[f]
0.001  ;[f]
0.001  ;[f]
0.5    ;[p]

;SIGMA is 1.0 fixed, serves as unscaled variance for EPS(1).  THETA(11) takes up the
; residual error scaling.
$SIGMA (1.0 FIXED)

$EST METHOD=SAEM INTERACTION NBURN=3000 NITER=500 PRINT=50 CTYPE=3 CITER=10 CINTERVAL=20 CALPHA=0.05
     FILE=wexample2.EXT NOABORT GRD=DDDDDDDDDDS
     ISAMPLE=1 ISAMPLE_M1=1 ISAMPLE_M2=1 ISAMPLE_M3=1
; After the SAEM method, obtain good estimates of the marginal density (objective function),
; along with good estimates of the standard errors.
$EST METHOD=IMP INTERACTION EONLY=1 NITER=5 ISAMPLE=1000 PRINT=1 SIGL=8 SEED=123334
     CTYPE=3 CITER=10 CALPHA=0.05
$EST  METHOD=COND INTERACTION MAXEVAL=9999 FILE=wexample2.EXT NSIG=2 SIGL=14 PRINT=5 NOABORT
$COV MATRIX=R UNCONDITIONAL

 WARNINGS AND ERRORS (IF ANY) FOR PROBLEM    1
 (WARNING  2) NM-TRAN INFERS THAT THE DATA ARE POPULATION.

1NONLINEAR MIXED EFFECTS MODEL PROGRAM (NONMEM) VERSION 7.1.0
 ORIGINALLY DEVELOPED BY STUART BEAL, LEWIS SHEINER, AND ALISON BOECKMANN
 CURRENT DEVELOPERS ARE ROBERT BAUER, ICON DEVELOPMENT SOLUTIONS,
 AND ALISON BOECKMANN. IMPLEMENTATION, EFFICIENCY, AND STANDARDIZATION
 PERFORMED BY NOUS INFOSYSTEMS.
 PROBLEM NO.:         1
 RUN# wexample2 example
 TOT. NO. OF OBS RECS:     2000
 TOT. NO. OF INDIVIDUALS:    400
 TWO COMPARTMENT MODEL (ADVAN3)
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 #METH: Stochastic Approximation Expectation-Maximization
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 Elapsed estimation time in seconds:    65.39

 #TERM:
 STOCHASTIC PORTION COMPLETED
 REDUCED STOCHASTIC PORTION COMPLETED

 ETABAR IS THE ARITHMETIC MEAN OF THE ETA-ESTIMATES,
 AND THE P-VALUE IS GIVEN FOR THE NULL HYPOTHESIS THAT THE TRUE MEAN IS 0.

 ETABAR:        -3.1031E-04  1.5042E-03 -4.4586E-03 -5.5651E-03
 SE:             4.9857E-03  4.6198E-03  5.9419E-03  5.2454E-03

 P VAL.:         9.5037E-01  7.4473E-01  4.5303E-01  2.8871E-01

 ETAshrink(%):   3.6309E+00  8.0976E-01 -2.9467E+00 -2.2423E+00
 EPSshrink(%):  -3.1646E+00


 #TERE:

 ********************                STOCHASTIC APPROXIMATION EXPECTATION-MAXIMIZATION               ********************
 #OBJT:**************                        FINAL VALUE OF LIKELIHOOD FUNCTION                      ********************
 #OBJV:********************************************   -19576.074       **************************************************

 ********************                STOCHASTIC APPROXIMATION EXPECTATION-MAXIMIZATION               ********************
 ********************                             FINAL PARAMETER ESTIMATE                           ********************

 THETA - VECTOR OF FIXED EFFECTS PARAMETERS   *********
         TH 1      TH 2      TH 3      TH 4      TH 5      TH 6      TH 7      TH 8      TH 9      TH10      TH11
         3.30E+00  3.25E+00 -6.12E-01 -2.08E-01  7.33E-01  1.13E+00  3.35E-01  1.92E-01  6.90E-01  2.30E+00  9.84E-02

 OMEGA - COV MATRIX FOR RANDOM EFFECTS - ETAS  ********
            ETA1      ETA2      ETA3      ETA4
 ETA1
+        1.07E-02
 ETA2
+        8.23E-04  8.70E-03
 ETA3
+        2.16E-03  1.58E-03  1.34E-02
 ETA4
+       -1.34E-04  1.27E-03  3.89E-03  1.06E-02

 SIGMA - COV MATRIX FOR RANDOM EFFECTS - EPSILONS  ****
            EPS1
 EPS1
+        1.00E+00
 #METH: Objective Function Evaluation by Importance Sampling
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 Elapsed estimation time in seconds:    22.98

 #TERM:
 OPTIMIZATION NOT TESTED


 ETABAR IS THE ARITHMETIC MEAN OF THE ETA-ESTIMATES,
 AND THE P-VALUE IS GIVEN FOR THE NULL HYPOTHESIS THAT THE TRUE MEAN IS 0.

 ETABAR:         6.5045E-04  1.4404E-03 -1.7373E-04  3.1860E-04
 SE:             4.7724E-03  3.1190E-03  3.4720E-03  3.6964E-03

 P VAL.:         8.9159E-01  6.4422E-01  9.6009E-01  9.3131E-01

 ETAshrink(%):   7.7534E+00  3.3032E+01  3.9846E+01  2.7952E+01
 EPSshrink(%):   2.7303E+01


 #TERE:
 Elapsed covariance time in seconds:    34.10

 ********************               OBJECTIVE FUNCTION EVALUATION BY IMPORTANCE SAMPLING             ********************
 #OBJT:**************                        FINAL VALUE OF OBJECTIVE FUNCTION                       ********************
 #OBJV:********************************************   -10779.024       **************************************************

 ********************               OBJECTIVE FUNCTION EVALUATION BY IMPORTANCE SAMPLING             ********************
 ********************                             FINAL PARAMETER ESTIMATE                           ********************

 THETA - VECTOR OF FIXED EFFECTS PARAMETERS   *********
         TH 1      TH 2      TH 3      TH 4      TH 5      TH 6      TH 7      TH 8      TH 9      TH10      TH11
         3.30E+00  3.25E+00 -6.12E-01 -2.08E-01  7.33E-01  1.13E+00  3.35E-01  1.92E-01  6.90E-01  2.30E+00  9.84E-02

 OMEGA - COV MATRIX FOR RANDOM EFFECTS - ETAS  ********
            ETA1      ETA2      ETA3      ETA4
 ETA1
+        1.07E-02
 ETA2
+        8.23E-04  8.70E-03
 ETA3
+        2.16E-03  1.58E-03  1.34E-02
 ETA4
+       -1.34E-04  1.27E-03  3.89E-03  1.06E-02

 SIGMA - COV MATRIX FOR RANDOM EFFECTS - EPSILONS  ****
            EPS1
 EPS1
+        1.00E+00

 ********************               OBJECTIVE FUNCTION EVALUATION BY IMPORTANCE SAMPLING             ********************
 ********************                          STANDARD ERROR OF ESTIMATE (R)                        ********************

 THETA - VECTOR OF FIXED EFFECTS PARAMETERS   *********
         TH 1      TH 2      TH 3      TH 4      TH 5      TH 6      TH 7      TH 8      TH 9      TH10      TH11
         3.31E-02  2.89E-02  9.64E-03  8.39E-03  3.98E-02  3.56E-02  1.15E-02  1.03E-02  1.08E-02  8.65E-03  2.64E-03

 OMEGA - COV MATRIX FOR RANDOM EFFECTS - ETAS  ********
            ETA1      ETA2      ETA3      ETA4
 ETA1
+        9.69E-04
 ETA2
+        8.19E-04  1.40E-03
 ETA3
+        1.22E-03  1.37E-03  2.47E-03
 ETA4
+        9.82E-04  1.10E-03  1.83E-03  1.85E-03

 SIGMA - COV MATRIX FOR RANDOM EFFECTS - EPSILONS  ****
            EPS1
 EPS1
+        0.00E+00
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 #METH: First Order Conditional Estimation with Interaction
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 Elapsed estimation time in seconds:    36.29

 #TERM:
0MINIMIZATION SUCCESSFUL
 NO. OF FUNCTION EVALUATIONS USED:      433
 NO. OF SIG. DIGITS IN FINAL EST.:  2.1

 ETABAR IS THE ARITHMETIC MEAN OF THE ETA-ESTIMATES,
 AND THE P-VALUE IS GIVEN FOR THE NULL HYPOTHESIS THAT THE TRUE MEAN IS 0.

 ETABAR:         6.5739E-05 -1.0212E-03 -4.4755E-05 -9.7040E-04
 SE:             4.7163E-03  2.9847E-03  2.9519E-03  3.6723E-03

 P VAL.:         9.8888E-01  7.3223E-01  9.8790E-01  7.9159E-01

 ETAshrink(%):   6.8634E+00  3.2963E+01  4.0969E+01  2.5237E+01
 EPSshrink(%):   2.6155E+01


 #TERE:
 Elapsed covariance time in seconds:    54.85

 ********************               FIRST ORDER CONDITIONAL ESTIMATION WITH INTERACTION              ********************
 #OBJT:**************                       MINIMUM VALUE OF OBJECTIVE FUNCTION                      ********************
 #OBJV:********************************************   -10772.143       **************************************************

 ********************               FIRST ORDER CONDITIONAL ESTIMATION WITH INTERACTION              ********************
 ********************                             FINAL PARAMETER ESTIMATE                           ********************

 THETA - VECTOR OF FIXED EFFECTS PARAMETERS   *********
         TH 1      TH 2      TH 3      TH 4      TH 5      TH 6      TH 7      TH 8      TH 9      TH10      TH11
         3.31E+00  3.26E+00 -6.12E-01 -2.08E-01  7.35E-01  1.14E+00  3.36E-01  1.92E-01  6.95E-01  2.30E+00  1.00E-01

 OMEGA - COV MATRIX FOR RANDOM EFFECTS - ETAS  ********
            ETA1      ETA2      ETA3      ETA4
 ETA1
+        1.03E-02
 ETA2
+        1.93E-04  7.95E-03
 ETA3
+        1.29E-03 -1.61E-04  1.00E-02
 ETA4
+       -5.94E-04  5.45E-04  2.01E-03  9.67E-03

 SIGMA - COV MATRIX FOR RANDOM EFFECTS - EPSILONS  ****
            EPS1
 EPS1
+        1.00E+00

 ********************               FIRST ORDER CONDITIONAL ESTIMATION WITH INTERACTION              ********************
 ********************                            STANDARD ERROR OF ESTIMATE                          ********************

 THETA - VECTOR OF FIXED EFFECTS PARAMETERS   *********
         TH 1      TH 2      TH 3      TH 4      TH 5      TH 6      TH 7      TH 8      TH 9      TH10      TH11
         3.27E-02  2.86E-02  9.52E-03  8.31E-03  3.92E-02  3.58E-02  1.13E-02  1.04E-02  1.05E-02  8.57E-03  2.83E-03

 OMEGA - COV MATRIX FOR RANDOM EFFECTS - ETAS  ********
            ETA1      ETA2      ETA3      ETA4
 ETA1
+        9.68E-04
 ETA2
+        8.28E-04  1.38E-03
 ETA3
+        1.28E-03  1.43E-03  3.05E-03
 ETA4
+        1.00E-03  1.10E-03  2.15E-03  1.93E-03

 SIGMA - COV MATRIX FOR RANDOM EFFECTS - EPSILONS  ****
            EPS1
 EPS1
+       .........
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