Thu Dec 10 18:25:17 GMT 2009
/opt/intel/fc/9.0/bin/ifc
;Model Desc: Receptor Mediated Clearance model with Dynamic Change in Receptors
;Project Name: wexamples
;Project ID: NO PROJECT DESCRIPTION

$PROB RUN# wexample6 (from r2compl)
$INPUT C SET ID JID TIME DV=CONC DOSE=AMT RATE EVID MDV CMT
$DATA wexample6.csv IGNORE=C

; The new numerical integration solver is used, although ADVAN=9 is also efficient
; for this problem.
$SUBROUTINES ADVAN13 TRANS1 TOL=3
$MODEL NCOMPARTMENTS=3

$PK
MU_1=THETA(1)
MU_2=THETA(2)
MU_3=THETA(3)
MU_4=THETA(4)
MU_5=THETA(5)
MU_6=THETA(6)
MU_7=THETA(7)
MU_8=THETA(8)
VC=EXP(MU_1+ETA(1))
K10=EXP(MU_2+ETA(2))
K12=EXP(MU_3+ETA(3))
K21=EXP(MU_4+ETA(4))
VM=EXP(MU_5+ETA(5))
KMC=EXP(MU_6+ETA(6))
K03=EXP(MU_7+ETA(7))
K30=EXP(MU_8+ETA(8))
S3=VC
S1=VC
KM=KMC*S1
F3=K03/K30

$DES
DADT(1) = -(K10+K12)*A(1) + K21*A(2) - VM*A(1)*A(3)/(A(1)+KM)
DADT(2) = K12*A(1) - K21*A(2)
DADT(3) =  -VM*A(1)*A(3)/(A(1)+KM) - K30*A(3) + K03

$ERROR
CALLFL=0
ETYPE=1
IF(CMT.NE.1) ETYPE=0
IPRED=F
Y = F + F*ETYPE*EPS(1) + F*(1.0-ETYPE)*EPS(2)

$THETA
;Initial Thetas
( 2.0 )  ;[MU_1]
( 2.0 ) ;[MU_2]
( 2.0 )  ;[MU_3]
( 2.0 );[MU_4]
( 2.0 ) ;[MU_5]
( 2.0 )  ;[MU_6]
( 2.0 )  ;[MU_7]
( 2.0 ) ;[MU_8]

;Initial Omegas
$OMEGA BLOCK(8)
0.8 ;[p]
-0.0043  ;[f]
0.8 ;[p]
0.0048   ;[f]
-0.0023  ;[f]
0.8 ;[p]
0.0032   ;[f]
0.0059   ;[f]
-0.0014  ;[f]
0.8 ;[p]
0.0029   ;[f]
0.002703 ;[f]
-0.00026 ;[f]
-0.0032  ;[f]
0.8 ;[p]
-0.0025  ;[f]
0.00097  ;[f]
0.0024   ;[f]
0.00197  ;[f]
-0.0080  ;[f]
0.8 ;[p]
0.0031   ;[f]
-0.00571 ;[f]
0.0030   ;[f]
-0.0074  ;[f]
0.0025   ;[f]
0.0034   ;[f]
0.8 ;[p]
0.00973  ;[f]
0.00862  ;[f]
0.0041   ;[f]
0.0046   ;[f]
0.00061  ;[f]
-0.0056  ;[f]
0.0056   ;[f]
0.8 ;[p]

$SIGMA
0.1 ;[p]
0.1 ;[p]

; Starting with a short iterative two stage analysis brings the results closer
; so less time needs to be spent during the burn-in of the BAYES analysis
$EST METHOD=ITS INTERACTION SIGL=3 NITER=20 PRINT=1 FILE=wexample6.EXT NOABORT CTYPE=3
; Finish with importance sampling
$EST METHOD=IMP INTERACTION SIGL=3 NITER=20 PRINT=1 FILE=wexample6.EXT NOABORT ISAMPLE=100
$COV MATRIX=R UNCONDITIONAL

 WARNINGS AND ERRORS (IF ANY) FOR PROBLEM    1
 (WARNING  2) NM-TRAN INFERS THAT THE DATA ARE POPULATION.

1NONLINEAR MIXED EFFECTS MODEL PROGRAM (NONMEM) VERSION 7.1.0
 ORIGINALLY DEVELOPED BY STUART BEAL, LEWIS SHEINER, AND ALISON BOECKMANN
 CURRENT DEVELOPERS ARE ROBERT BAUER, ICON DEVELOPMENT SOLUTIONS,
 AND ALISON BOECKMANN. IMPLEMENTATION, EFFICIENCY, AND STANDARDIZATION
 PERFORMED BY NOUS INFOSYSTEMS.
 PROBLEM NO.:         1
 RUN# wexample6 (from r2compl)
 TOT. NO. OF OBS RECS:     1568
 TOT. NO. OF INDIVIDUALS:     50
 GENERAL NONLINEAR KINETICS MODEL USING LSODA (ADVAN13)
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 #METH: Iterative Two Stage
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 Elapsed estimation time in seconds:   175.30

 #TERM:
 OPTIMIZATION NOT COMPLETED


 ETABAR IS THE ARITHMETIC MEAN OF THE ETA-ESTIMATES,
 AND THE P-VALUE IS GIVEN FOR THE NULL HYPOTHESIS THAT THE TRUE MEAN IS 0.

 ETABAR:         3.9625E-04 -4.9624E-03 -5.6302E-04  3.1596E-05  9.7087E-04  2.1306E-03  9.6880E-04  9.1417E-04
 SE:             6.9218E-02  5.2577E-02  3.8881E-02  6.5603E-02  5.6918E-02  5.7533E-02  6.3945E-02  6.1436E-02

 P VAL.:         9.9543E-01  9.2480E-01  9.8845E-01  9.9962E-01  9.8639E-01  9.7046E-01  9.8791E-01  9.8813E-01

 ETAshrink(%):   5.9903E-01  4.4328E+00  9.2795E+00  2.1104E+00  1.5526E+00  6.0250E+00  3.0057E-01  1.7343E+00
 EPSshrink(%):   1.4781E+01  5.9923E+00


 #TERE:
 Elapsed covariance time in seconds:     0.14

 ********************                               ITERATIVE TWO STAGE                              ********************
 #OBJT:**************                        FINAL VALUE OF OBJECTIVE FUNCTION                       ********************
 #OBJV:********************************************    -4708.871       **************************************************

 ********************                               ITERATIVE TWO STAGE                              ********************
 ********************                             FINAL PARAMETER ESTIMATE                           ********************

 THETA - VECTOR OF FIXED EFFECTS PARAMETERS   *********
         TH 1      TH 2      TH 3      TH 4      TH 5      TH 6      TH 7      TH 8
         3.90E+00 -2.17E+00  5.65E-01 -1.84E-01  2.26E+00  2.07E-01  3.70E+00 -7.10E-01

 OMEGA - COV MATRIX FOR RANDOM EFFECTS - ETAS  ********
            ETA1      ETA2      ETA3      ETA4      ETA5      ETA6      ETA7      ETA8
 ETA1
+        2.47E-01
 ETA2
+       -3.11E-02  1.54E-01
 ETA3
+        4.80E-02 -1.22E-02  9.37E-02
 ETA4
+        3.19E-02  4.28E-02 -1.45E-02  2.29E-01
 ETA5
+        2.66E-02  2.69E-02 -2.64E-03 -3.25E-02  1.71E-01
 ETA6
+       -2.87E-02  1.45E-02  2.34E-02  1.81E-02 -7.95E-02  1.91E-01
 ETA7
+        2.84E-02 -2.85E-02  3.08E-02 -7.22E-02  2.30E-02  3.35E-05  2.10E-01
 ETA8
+        9.61E-02  8.47E-02  3.99E-02  4.77E-02  1.18E-03 -5.58E-02  5.32E-02  1.99E-01

 SIGMA - COV MATRIX FOR RANDOM EFFECTS - EPSILONS  ****
            EPS1      EPS2
 EPS1
+        9.03E-03
 EPS2
+        0.00E+00  2.18E-02

 ********************                               ITERATIVE TWO STAGE                              ********************
 ********************                          STANDARD ERROR OF ESTIMATE (S)                        ********************

 THETA - VECTOR OF FIXED EFFECTS PARAMETERS   *********
         TH 1      TH 2      TH 3      TH 4      TH 5      TH 6      TH 7      TH 8
         4.10E-01  2.01E-01  3.12E-01  3.25E-01  2.22E-01  3.18E-01  1.47E-01  3.88E-01

 OMEGA - COV MATRIX FOR RANDOM EFFECTS - ETAS  ********
            ETA1      ETA2      ETA3      ETA4      ETA5      ETA6      ETA7      ETA8
 ETA1
+        1.66E-01
 ETA2
+        1.92E-01  2.80E-01
 ETA3
+        1.11E-01  1.28E-01  1.82E-01
 ETA4
+        8.59E-02  1.43E-01  1.25E-01  1.66E-01
 ETA5
+        1.36E-01  9.45E-02  9.64E-02  1.76E-01  2.90E-01
 ETA6
+        1.07E-01  1.79E-01  1.40E-01  1.51E-01  9.20E-02  1.97E-01
 ETA7
+        1.47E-01  8.37E-02  1.49E-01  9.24E-02  9.71E-02  1.01E-01  1.41E-01
 ETA8
+        2.26E-01  1.51E-01  5.71E-02  1.09E-01  1.24E-01  2.29E-01  1.20E-01  3.00E-01

 SIGMA - COV MATRIX FOR RANDOM EFFECTS - EPSILONS  ****
            EPS1      EPS2
 EPS1
+        3.34E-03
 EPS2
+        0.00E+00  3.64E-03
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 #METH: Importance Sampling
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 Elapsed estimation time in seconds:   105.60

 #TERM:
 OPTIMIZATION NOT COMPLETED


 ETABAR IS THE ARITHMETIC MEAN OF THE ETA-ESTIMATES,
 AND THE P-VALUE IS GIVEN FOR THE NULL HYPOTHESIS THAT THE TRUE MEAN IS 0.

 ETABAR:         2.9168E-03 -3.0967E-03 -1.6973E-03  2.0109E-03  6.0335E-05  4.8607E-04  1.1922E-03  2.8457E-04
 SE:             6.9386E-02  5.6646E-02  3.9492E-02  6.5750E-02  5.6753E-02  5.7889E-02  6.4613E-02  6.0951E-02

 P VAL.:         9.6647E-01  9.5640E-01  9.6572E-01  9.7560E-01  9.9915E-01  9.9330E-01  9.8528E-01  9.9627E-01

 ETAshrink(%):   9.5805E-01  4.1908E+00  7.8699E+00  2.0640E+00  2.8890E+00  3.4900E+00  6.1534E-01  2.0517E+00
 EPSshrink(%):   1.3544E+01  5.2215E+00


 #TERE:
 Elapsed covariance time in seconds:    10.86

 ********************                               IMPORTANCE SAMPLING                              ********************
 #OBJT:**************                        FINAL VALUE OF OBJECTIVE FUNCTION                       ********************
 #OBJV:********************************************    -4710.416       **************************************************

 ********************                               IMPORTANCE SAMPLING                              ********************
 ********************                             FINAL PARAMETER ESTIMATE                           ********************

 THETA - VECTOR OF FIXED EFFECTS PARAMETERS   *********
         TH 1      TH 2      TH 3      TH 4      TH 5      TH 6      TH 7      TH 8
         3.90E+00 -2.22E+00  5.62E-01 -1.80E-01  2.27E+00  2.33E-01  3.71E+00 -7.01E-01

 OMEGA - COV MATRIX FOR RANDOM EFFECTS - ETAS  ********
            ETA1      ETA2      ETA3      ETA4      ETA5      ETA6      ETA7      ETA8
 ETA1
+        2.50E-01
 ETA2
+       -4.23E-02  1.78E-01
 ETA3
+        4.62E-02 -1.97E-02  9.37E-02
 ETA4
+        3.30E-02  5.63E-02 -1.67E-02  2.30E-01
 ETA5
+        2.64E-02  2.76E-02 -1.80E-03 -3.47E-02  1.74E-01
 ETA6
+       -2.58E-02  1.06E-02  2.15E-02  1.69E-02 -7.71E-02  1.84E-01
 ETA7
+        3.14E-02 -4.97E-02  2.86E-02 -7.58E-02  2.42E-02  9.72E-04  2.16E-01
 ETA8
+        9.74E-02  8.48E-02  4.00E-02  4.57E-02  1.10E-04 -5.50E-02  5.50E-02  1.98E-01

 SIGMA - COV MATRIX FOR RANDOM EFFECTS - EPSILONS  ****
            EPS1      EPS2
 EPS1
+        8.92E-03
 EPS2
+        0.00E+00  2.15E-02

 ********************                               IMPORTANCE SAMPLING                              ********************
 ********************                          STANDARD ERROR OF ESTIMATE (R)                        ********************

 THETA - VECTOR OF FIXED EFFECTS PARAMETERS   *********
         TH 1      TH 2      TH 3      TH 4      TH 5      TH 6      TH 7      TH 8
         7.15E-02  7.29E-02  5.04E-02  7.00E-02  6.14E-02  6.77E-02  6.64E-02  6.46E-02

 OMEGA - COV MATRIX FOR RANDOM EFFECTS - ETAS  ********
            ETA1      ETA2      ETA3      ETA4      ETA5      ETA6      ETA7      ETA8
 ETA1
+        5.03E-02
 ETA2
+        3.81E-02  6.11E-02
 ETA3
+        2.53E-02  2.35E-02  2.90E-02
 ETA4
+        3.46E-02  3.72E-02  2.75E-02  5.18E-02
 ETA5
+        3.07E-02  2.71E-02  2.20E-02  2.97E-02  3.55E-02
 ETA6
+        3.45E-02  3.71E-02  2.43E-02  3.36E-02  2.99E-02  7.18E-02
 ETA7
+        3.39E-02  3.89E-02  2.29E-02  3.39E-02  2.81E-02  3.29E-02  4.47E-02
 ETA8
+        3.47E-02  3.34E-02  2.52E-02  3.21E-02  2.75E-02  3.30E-02  3.08E-02  4.07E-02

 SIGMA - COV MATRIX FOR RANDOM EFFECTS - EPSILONS  ****
            EPS1      EPS2
 EPS1
+        5.22E-04
 EPS2
+        0.00E+00  1.01E-03
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